OpenVSP model (file version 5), 8 components.
Geometry view with OpenVSP parameter names; values to 6 digits, angles in degrees, lengths in the model's unit.
Overall bounding box: X_Min=3.741 X_Len=16.259 Y_Min=-19.25 Y_Len=38.5 Z_Min=7.1125 Z_Len=1.39697

Fuselage "Rotor_2_Support"
  location (X Y Z) 12 -18.75 7.6125, rotation 0 0 0
  bounding box size 8 1 1
  Design: Length=8
  cross sections:
    n  XLocPercent  YLocPercent  ZLocPercent  shape
    0  0            0            0            point
    1  0.25         0            0            circle Circle_Diameter=1
    2  0.5          0            0            as above
    3  0.75         0            0            as above
    4  1            0            0            point

Fuselage "Rotor_3_Support"
  location (X Y Z) 3.741 -8.25 7.9, rotation -8 0 0
  bounding box size 8 1.02867 1.02867
  Design: Length=8
  cross sections:
    n  XLocPercent  YLocPercent  ZLocPercent  shape
    0  0            0            0            point
    1  0.25         0            0            circle Circle_Diameter=1
    2  0.5          0            0            as above
    3  0.75         0            0            as above
    4  1            0            0            point

Fuselage "Rotor_4_Support"
  location (X Y Z) 11.5 -8.25 7.898, rotation -8 0 1.5
  bounding box size 7.99726 1.16659 1.04809
  Design: Length=8
  cross sections:
    n  XLocPercent  YLocPercent  ZLocPercent  shape
    0  0            0            0            point
    1  0.25         0            0            circle Circle_Diameter=1
    2  0.5          0            0            as above
    3  0.75         0            0            as above
    4  1            0            0            point

Fuselage "Rotor_5_Support"
  location (X Y Z) 3.741 8.25 7.9, rotation -8 0 0
  bounding box size 8 1.02867 1.02867
  Design: Length=8
  cross sections:
    n  XLocPercent  YLocPercent  ZLocPercent  shape
    0  0            0            0            point
    1  0.25         0            0            circle Circle_Diameter=1
    2  0.5          0            0            as above
    3  0.75         0            0            as above
    4  1            0            0            point

Fuselage "Rotor_6_Support"
  location (X Y Z) 11.5 8.25 8, rotation -8 0 1.5
  bounding box size 7.99726 1.16659 1.04809
  Design: Length=8
  cross sections:
    n  XLocPercent  YLocPercent  ZLocPercent  shape
    0  0            0            0            point
    1  0.25         0            0            circle Circle_Diameter=1
    2  0.5          0            0            as above
    3  0.75         0            0            as above
    4  1            0            0            point

Fuselage "Rotor_7_Support"
  location (X Y Z) 4.2 18.75 7.6125, rotation 0 0 0
  bounding box size 8 1 1
  Design: Length=8
  cross sections:
    n  XLocPercent  YLocPercent  ZLocPercent  shape
    0  0            0            0            point
    1  0.25         0            0            circle Circle_Diameter=1
    2  0.5          0            0            as above
    3  0.75         0            0            as above
    4  1            0            0            point

Fuselage "Rotor_8_Support"
  location (X Y Z) 12 18.75 7.6125, rotation 0 0 0
  bounding box size 8 1 1
  Design: Length=8
  cross sections:
    n  XLocPercent  YLocPercent  ZLocPercent  shape
    0  0            0            0            point
    1  0.25         0            0            circle Circle_Diameter=1
    2  0.5          0            0            as above
    3  0.75         0            0            as above
    4  1            0            0            point

Fuselage "Rotor_1_Support"
  location (X Y Z) 4.2 -18.75 7.615, rotation 0 0 0
  bounding box size 8 1 1
  Design: Length=8
  cross sections:
    n  XLocPercent  YLocPercent  ZLocPercent  shape
    0  0            0            0            point
    1  0.25         0            0            circle Circle_Diameter=1
    2  0.5          0            0            as above
    3  0.75         0            0            as above
    4  1            0            0            point

Advanced link "BladePitch"
  input Pitch75R = (not in this file)
  output Pitch1 = (not in this file)
  output Pitch2 = (not in this file)
  output Pitch3 = (not in this file)
    Pitch1 = Pitch75R;
    Pitch2 = Pitch75R;
    Pitch3 = Pitch75R;
