OpenVSP model (file version 5), 41 components.
Geometry view with OpenVSP parameter names; values to 6 digits, angles in degrees, lengths in the model's unit.
Overall bounding box: X_Min=0 X_Len=32.0647 Y_Min=-25.2496 Y_Len=50.4992 Z_Min=-0.125 Z_Len=14.0359

Fuselage "Fuselage_***.main"
  location (X Y Z) 1.88864 0 4.24937, rotation 0 0 0
  bounding box size 30 6.17591 6.41246
  mass: Density=2 Shell_Flag=0 Mass_Area=1 Mass_Prior=5
  Design: Length=30
  cross sections:
    n  XLocPercent  YLocPercent  ZLocPercent  shape
    0  0            0            0            point
    1  0.024145     0            -0.002082    general fuselage BotStr=0.827589 BotTanAngle=90 CornerRad=0 Height=2.14 LowStr=0.81429 MaxWidthLoc=0.024812 TopStr=1.10925 TopTanAngle=90 UpStr=0.692274 Width=2.29485
    2  0.121627     0            0.025612     general fuselage BotStr=1.19151 BotTanAngle=90 CornerRad=0 Height=5 LowStr=1.27 MaxWidthLoc=-0.117303 TopStr=0.342421 TopTanAngle=90 UpStr=1.7302 Width=4.93996
    3  0.211428     0            0.04395      general fuselage BotStr=1.1383 BotTanAngle=90 CornerRad=0 Height=6.12707 LowStr=1.42286 MaxWidthLoc=-0.190324 TopStr=0.651397 TopTanAngle=90 UpStr=1.74091 Width=5.76983
    4  0.418359     0            0.04395      general fuselage BotStr=1.27659 BotTanAngle=90 CornerRad=0 Height=6.12707 LowStr=1.42286 MaxWidthLoc=-0.190324 TopStr=1.00146 TopTanAngle=90 UpStr=2 Width=6.15026
    5  0.479564     0            0.0531551    general fuselage BotStr=0.781013 BotTanAngle=90 CornerRad=0 Height=5.62169 LowStr=1.5 MaxWidthLoc=-0.125562 TopStr=1.25 TopTanAngle=90 UpStr=1.50472 Width=5.11011
    6  0.614653     0            0.098281     general fuselage BotStr=0.337871 BotTanAngle=90 CornerRad=0 Height=2.69202 LowStr=1.0683 MaxWidthLoc=-0.310309 TopStr=1.54262 TopTanAngle=90 UpStr=0.818164 Width=3.17945
    7  0.923427     0            0.116377     general fuselage BotStr=0.952476 BotTanAngle=90 CornerRad=0 Height=1.18739 LowStr=0.67819 MaxWidthLoc=-0.500607 TopStr=2 TopTanAngle=90 UpStr=1.27804 Width=0.874706
    8  1            0            0.118292     point

Fuselage "Rotor_2_Support"
  location (X Y Z) 12 -18.75 7.6125, rotation 0 0 0
  bounding box size 8 1 1
  Design: Length=8
  cross sections:
    n  XLocPercent  YLocPercent  ZLocPercent  shape
    0  0            0            0            point
    1  0.25         0            0            circle Circle_Diameter=1
    2  0.5          0            0            as above
    3  0.75         0            0            as above
    4  1            0            0            point

Fuselage "Rotor_3_Support"
  location (X Y Z) 3.741 -8.25 7.9, rotation -8 0 0
  bounding box size 8 1.02867 1.02867
  Design: Length=8
  cross sections:
    n  XLocPercent  YLocPercent  ZLocPercent  shape
    0  0            0            0            point
    1  0.25         0            0            circle Circle_Diameter=1
    2  0.5          0            0            as above
    3  0.75         0            0            as above
    4  1            0            0            point

Fuselage "Rotor_4_Support"
  location (X Y Z) 11.5 -8.25 7.898, rotation -8 0 1.5
  bounding box size 7.99726 1.16659 1.04809
  Design: Length=8
  cross sections:
    n  XLocPercent  YLocPercent  ZLocPercent  shape
    0  0            0            0            point
    1  0.25         0            0            circle Circle_Diameter=1
    2  0.5          0            0            as above
    3  0.75         0            0            as above
    4  1            0            0            point

Fuselage "Rotor_5_Support"
  location (X Y Z) 3.741 8.25 7.9, rotation -8 0 0
  bounding box size 8 1.02867 1.02867
  Design: Length=8
  cross sections:
    n  XLocPercent  YLocPercent  ZLocPercent  shape
    0  0            0            0            point
    1  0.25         0            0            circle Circle_Diameter=1
    2  0.5          0            0            as above
    3  0.75         0            0            as above
    4  1            0            0            point

Fuselage "Rotor_6_Support"
  location (X Y Z) 11.5 8.25 8, rotation -8 0 1.5
  bounding box size 7.99726 1.16659 1.04809
  Design: Length=8
  cross sections:
    n  XLocPercent  YLocPercent  ZLocPercent  shape
    0  0            0            0            point
    1  0.25         0            0            circle Circle_Diameter=1
    2  0.5          0            0            as above
    3  0.75         0            0            as above
    4  1            0            0            point

Fuselage "Rotor_7_Support"
  location (X Y Z) 4.2 18.75 7.6125, rotation 0 0 0
  bounding box size 8 1 1
  Design: Length=8
  cross sections:
    n  XLocPercent  YLocPercent  ZLocPercent  shape
    0  0            0            0            point
    1  0.25         0            0            circle Circle_Diameter=1
    2  0.5          0            0            as above
    3  0.75         0            0            as above
    4  1            0            0            point

Fuselage "Rotor_8_Support"
  location (X Y Z) 12 18.75 7.6125, rotation 0 0 0
  bounding box size 8 1 1
  Design: Length=8
  cross sections:
    n  XLocPercent  YLocPercent  ZLocPercent  shape
    0  0            0            0            point
    1  0.25         0            0            circle Circle_Diameter=1
    2  0.5          0            0            as above
    3  0.75         0            0            as above
    4  1            0            0            point

Blank "Wing_Parent"
  location (X Y Z) 9 0 8.5, rotation 0 0 0

Wing "Wing_1"
  location (X Y Z) 8.89 0 8.5, rotation 0 0 0
  symmetric about XZ
  bounding box size 5.43998 50.4992 1.63149
  totals: TotalSpan=50.53 TotalProjectedSpan=50.4992 TotalChord=3.38 TotalArea=210.278 TotalAR=12.1276 RelativeTwistFlag=1
  root: chord 5.44328, twist 2, airfoil file "NASA/LANGLEY LS(1)-0417 (GA(W)-1) AIRFOIL"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 BaseThickChord=0.16998 ThickChord=0.16998
  sections:
    n  Span     Root_Chord  Tip_Chord  Area     Sweep    Sweep_Location  Dihedral  Twist  Twist_Location  tip airfoil
    1  14.745   5.44328     4.13083    70.5852  0        0.7             -2        -0.5   0.7             as above
    2  6.62693  4.13083     3.30466    24.6373  0        0.7             -2        -0.5   0.7             as above
    3  2.08309  3.30466     2.84088    6.40087  3.63636  0.7             -2        -0.5   0.7             as above
    4  1.80996  2.84088     1.04396    3.5157   8        0.7             -2        -0.5   0.7             as above

Wing "Tail_2"
  location (X Y Z) 20.843 0 8.23086, rotation 90 0 0
  bounding box size 11.2217 1.12017 5.68
  totals: TotalSpan=5.68 TotalProjectedSpan=5.68 TotalChord=5.55 TotalArea=27.3432 TotalAR=1.1799
  root: chord 9.73719, twist 0, NACA 4-series Camber=0 CamberLoc=0.2 ThickChord=0.115
  sections:
    n  Span      Root_Chord  Tip_Chord  Area     Sweep  Sweep_Location  Dihedral  Twist  Twist_Location  tip airfoil
    1  1.14165   9.73719     5.94823    8.95367  15     1               0         0      0.25            NACA 4-series Camber=0 CamberLoc=0.2 ThickChord=0.14
    2  0.42729   5.94823     5.26478    2.39561  15     1               0         0      0.25            NACA 4-series Camber=0 CamberLoc=0.2 ThickChord=0.15
    3  0.520148  5.26478     4.78439    2.61353  15     1               0         0      0.25            as above
    4  3.59091   4.78439     2.66802    13.3804  15     1               0         0      0.25            NACA 4-series Camber=0 CamberLoc=0.2 ThickChord=0.115

Wing "Tail_1"
  location (X Y Z) 27.4277 0 8.00806, rotation 0 0 0
  symmetric about XZ
  bounding box size 3.75888 13.04 0.568655
  totals: TotalSpan=13.04 TotalProjectedSpan=13.04 TotalChord=3.03 TotalArea=39.5112 TotalAR=4.30363
  root: chord 3.7875, twist 0, NACA 4-series Camber=0 CamberLoc=0.2 ThickChord=0.15
  sections:
    n  Span  Root_Chord  Tip_Chord  Area     Sweep  Sweep_Location  Dihedral  Twist  Twist_Location  tip airfoil
    1  6.52  3.7875      2.2725     19.7556  0      0.25            0         0      0.25            as above

Wing "LandingGear_010.NoseStr"
  location (X Y Z) 5 0 1.55, rotation 90 0 0
  bounding box size 1.11397 0.375156 1
  totals: TotalSpan=1 TotalProjectedSpan=1 TotalChord=0.75 TotalArea=0.75 TotalAR=1.33333
  root: chord 0.75, twist 0, NACA 4-series Camber=0 CamberLoc=0.2 ThickChord=0.5
  sections:
    n  Span  Root_Chord  Tip_Chord  Area  Sweep  Sweep_Location  Dihedral  Twist  Twist_Location  tip airfoil
    1  1     0.75        0.75       0.75  20     0               0         0      0               as above

Wing "LandingGear_020.LeftStr"
  location (X Y Z) 15.75 -3 1.55, rotation -105 0 -180
  bounding box size 1.11397 0.621192 1.06302
  totals: TotalSpan=1 TotalProjectedSpan=1 TotalChord=0.75 TotalArea=0.75 TotalAR=1.33333
  root: chord 0.75, twist 0, NACA 4-series Camber=0 CamberLoc=0.2 ThickChord=0.5
  sections:
    n  Span  Root_Chord  Tip_Chord  Area  Sweep  Sweep_Location  Dihedral  Twist  Twist_Location  tip airfoil
    1  1     0.75        0.75       0.75  20     0               0         0      0               as above

Wing "LandingGear-020_RightStr"
  location (X Y Z) 15.75 3 1.55, rotation -75 0 -180
  bounding box size 1.11397 0.621192 1.06302
  totals: TotalSpan=1 TotalProjectedSpan=1 TotalChord=0.75 TotalArea=0.75 TotalAR=1.33333
  root: chord 0.75, twist 0, NACA 4-series Camber=0 CamberLoc=0.2 ThickChord=0.5
  sections:
    n  Span  Root_Chord  Tip_Chord  Area  Sweep  Sweep_Location  Dihedral  Twist  Twist_Location  tip airfoil
    1  1     0.75        0.75       0.75  20     0               0         0      0               as above

Blank "Systems"
  location (X Y Z) 16 0 6, rotation 0 0 0

Blank "FuelTank_2_Full"
  location (X Y Z) 15.5 0 4.15, rotation 0 0 0

Blank "FuelTank_2_Empty"
  location (X Y Z) 15.5 0 4.15, rotation 0 0 0

Blank "Rotor_9_mass"
  location (X Y Z) 0 0 0, rotation 0 0 0

Blank "Propulsion-3"
  location (X Y Z) 4.65 -8.37 7, rotation 0 0 0

Blank "Propulsion-4"
  location (X Y Z) 18.77 -8.1 9.25, rotation 0 0 0

Blank "Propulsion-5"
  location (X Y Z) 4.625 8.2 7, rotation 0 0 0

Blank "Propulsion-6"
  location (X Y Z) 18.75 8.4 9.25, rotation 0 0 0

Blank "Propulsion-7"
  location (X Y Z) 5 18.75 6.75, rotation 0 0 0

Blank "Propulsion-8"
  location (X Y Z) 19.22 18.75 9, rotation 0 0 0

Blank "Propulsion-9"
  location (X Y Z) 32 0 7.79, rotation 0 0 0

Blank "Propulsion-10"
  location (X Y Z) 2.75 0 4.15, rotation 0 0 0

Blank "EngineGroup-3-mass"
  location (X Y Z) 4.65 -8.37 7, rotation 0 0 0

Blank "EngineGroup-4-mass"
  location (X Y Z) 18.77 -8.1 9.25, rotation 0 0 0

Blank "EngineGroup-5-mass"
  location (X Y Z) 4.625 8.2 7, rotation 0 0 0

Blank "EngineGroup-6-mass"
  location (X Y Z) 18.75 8.4 9.25, rotation 0 0 0

Blank "EngineGroup-7-mass"
  location (X Y Z) 5 18.75 6.75, rotation 0 0 0

Blank "EngineGroup-8-mass"
  location (X Y Z) 19.22 18.75 9, rotation 0 0 0

Blank "EngineGroup-9-mass"
  location (X Y Z) 32 0 7.79, rotation 0 0 0

Blank "EngineGroup-10-mass"
  location (X Y Z) 2.75 0 4.15, rotation 0 0 0

Blank "FuelTank_1_050.leftmass"
  location (X Y Z) 16 -2.65 3.35, rotation 0 0 0

Blank "FuelTank_1_050.rightmass"
  location (X Y Z) 16 2.65 3.35, rotation 0 0 0

BodyOfRevolution "LandingGear-010_NoseWheel"
  location (X Y Z) 5.35 -0.375 0.75, rotation 0 0 90
  bounding box size 1.75 0.75 1.75
  Design: A0=0.785398 Ae=0.785398 Amin=0.0490874 AminW=0.25 Angle=0 Diameter=1 Mode=0
  profile: circle Circle_Diameter=0.75

BodyOfRevolution "LandingGear-020_LeftWheel"
  location (X Y Z) 15.35 -3.375 0.75, rotation -180 0 -90
  bounding box size 1.75 0.75 1.75
  Design: A0=0.785398 Ae=0.785398 Amin=0.0490874 AminW=0.25 Angle=0 Diameter=1 Mode=0
  profile: circle Circle_Diameter=0.75

BodyOfRevolution "LandingGear-020_RightWheel"
  location (X Y Z) 15.35 2.625 0.75, rotation -180 0 -90
  bounding box size 1.75 0.75 1.75
  Design: A0=0.785398 Ae=0.785398 Amin=0.0490874 AminW=0.25 Angle=0 Diameter=1 Mode=0
  profile: circle Circle_Diameter=0.75

Fuselage "Rotor_1_Support"
  location (X Y Z) 4.2 -18.75 7.615, rotation 0 0 0
  bounding box size 8 1 1
  Design: Length=8
  cross sections:
    n  XLocPercent  YLocPercent  ZLocPercent  shape
    0  0            0            0            point
    1  0.25         0            0            circle Circle_Diameter=1
    2  0.5          0            0            as above
    3  0.75         0            0            as above
    4  1            0            0            point

Advanced link "BladePitch"
  input Pitch75R = (not in this file)
  output Pitch1 = (not in this file)
  output Pitch2 = (not in this file)
  output Pitch3 = (not in this file)
    Pitch1 = Pitch75R;
    Pitch2 = Pitch75R;
    Pitch3 = Pitch75R;
