OpenVSP model (file version 5), 1 components.
Geometry view with OpenVSP parameter names; values to 6 digits, angles in degrees, lengths in the model's unit.
Overall bounding box: X_Min=1.88864 X_Len=30 Y_Min=-3.08796 Y_Len=6.17591 Z_Min=2.37174 Z_Len=6.41246

Fuselage "Fuselage_***.main"
  location (X Y Z) 1.88864 0 4.24937, rotation 0 0 0
  bounding box size 30 6.17591 6.41246
  mass: Density=2 Shell_Flag=0 Mass_Area=1 Mass_Prior=5
  Design: Length=30
  cross sections:
    n  XLocPercent  YLocPercent  ZLocPercent  shape
    0  0            0            0            point
    1  0.024145     0            -0.002082    general fuselage BotStr=0.827589 BotTanAngle=90 CornerRad=0 Height=2.14 LowStr=0.81429 MaxWidthLoc=0.024812 TopStr=1.10925 TopTanAngle=90 UpStr=0.692274 Width=2.29485
    2  0.121627     0            0.025612     general fuselage BotStr=1.19151 BotTanAngle=90 CornerRad=0 Height=5 LowStr=1.27 MaxWidthLoc=-0.117303 TopStr=0.342421 TopTanAngle=90 UpStr=1.7302 Width=4.93996
    3  0.211428     0            0.04395      general fuselage BotStr=1.1383 BotTanAngle=90 CornerRad=0 Height=6.12707 LowStr=1.42286 MaxWidthLoc=-0.190324 TopStr=0.651397 TopTanAngle=90 UpStr=1.74091 Width=5.76983
    4  0.418359     0            0.04395      general fuselage BotStr=1.27659 BotTanAngle=90 CornerRad=0 Height=6.12707 LowStr=1.42286 MaxWidthLoc=-0.190324 TopStr=1.00146 TopTanAngle=90 UpStr=2 Width=6.15026
    5  0.479564     0            0.0531551    general fuselage BotStr=0.781013 BotTanAngle=90 CornerRad=0 Height=5.62169 LowStr=1.5 MaxWidthLoc=-0.125562 TopStr=1.25 TopTanAngle=90 UpStr=1.50472 Width=5.11011
    6  0.614653     0            0.098281     general fuselage BotStr=0.337871 BotTanAngle=90 CornerRad=0 Height=2.69202 LowStr=1.0683 MaxWidthLoc=-0.310309 TopStr=1.54262 TopTanAngle=90 UpStr=0.818164 Width=3.17945
    7  0.923427     0            0.116377     general fuselage BotStr=0.952476 BotTanAngle=90 CornerRad=0 Height=1.18739 LowStr=0.67819 MaxWidthLoc=-0.500607 TopStr=2 TopTanAngle=90 UpStr=1.27804 Width=0.874706
    8  1            0            0.118292     point

Advanced link "BladePitch"
  input Pitch75R = (not in this file)
  output Pitch1 = (not in this file)
  output Pitch2 = (not in this file)
  output Pitch3 = (not in this file)
    Pitch1 = Pitch75R;
    Pitch2 = Pitch75R;
    Pitch3 = Pitch75R;
