OpenVSP model (file version 5), 6 components.
Geometry view with OpenVSP parameter names; values to 6 digits, angles in degrees, lengths in the model's unit.
Overall bounding box: X_Min=4.475 X_Len=11.75 Y_Min=-3.375 Y_Len=6.75 Z_Min=-0.125 Z_Len=2.68947

Wing "LandingGear_010.NoseStr"
  location (X Y Z) 5 0 1.55, rotation 90 0 0
  bounding box size 1.11397 0.375156 1
  totals: TotalSpan=1 TotalProjectedSpan=1 TotalChord=0.75 TotalArea=0.75 TotalAR=1.33333
  root: chord 0.75, twist 0, NACA 4-series Camber=0 CamberLoc=0.2 ThickChord=0.5
  sections:
    n  Span  Root_Chord  Tip_Chord  Area  Sweep  Sweep_Location  Dihedral  Twist  Twist_Location  tip airfoil
    1  1     0.75        0.75       0.75  20     0               0         0      0               as above

Wing "LandingGear_020.LeftStr"
  location (X Y Z) 15.75 -3 1.55, rotation -105 0 -180
  bounding box size 1.11397 0.621192 1.06302
  totals: TotalSpan=1 TotalProjectedSpan=1 TotalChord=0.75 TotalArea=0.75 TotalAR=1.33333
  root: chord 0.75, twist 0, NACA 4-series Camber=0 CamberLoc=0.2 ThickChord=0.5
  sections:
    n  Span  Root_Chord  Tip_Chord  Area  Sweep  Sweep_Location  Dihedral  Twist  Twist_Location  tip airfoil
    1  1     0.75        0.75       0.75  20     0               0         0      0               as above

Wing "LandingGear-020_RightStr"
  location (X Y Z) 15.75 3 1.55, rotation -75 0 -180
  bounding box size 1.11397 0.621192 1.06302
  totals: TotalSpan=1 TotalProjectedSpan=1 TotalChord=0.75 TotalArea=0.75 TotalAR=1.33333
  root: chord 0.75, twist 0, NACA 4-series Camber=0 CamberLoc=0.2 ThickChord=0.5
  sections:
    n  Span  Root_Chord  Tip_Chord  Area  Sweep  Sweep_Location  Dihedral  Twist  Twist_Location  tip airfoil
    1  1     0.75        0.75       0.75  20     0               0         0      0               as above

BodyOfRevolution "LandingGear-010_NoseWheel"
  location (X Y Z) 5.35 -0.375 0.75, rotation 0 0 90
  bounding box size 1.75 0.75 1.75
  Design: A0=0.785398 Ae=0.785398 Amin=0.0490874 AminW=0.25 Angle=0 Diameter=1 Mode=0
  profile: circle Circle_Diameter=0.75

BodyOfRevolution "LandingGear-020_LeftWheel"
  location (X Y Z) 15.35 -3.375 0.75, rotation -180 0 -90
  bounding box size 1.75 0.75 1.75
  Design: A0=0.785398 Ae=0.785398 Amin=0.0490874 AminW=0.25 Angle=0 Diameter=1 Mode=0
  profile: circle Circle_Diameter=0.75

BodyOfRevolution "LandingGear-020_RightWheel"
  location (X Y Z) 15.35 2.625 0.75, rotation -180 0 -90
  bounding box size 1.75 0.75 1.75
  Design: A0=0.785398 Ae=0.785398 Amin=0.0490874 AminW=0.25 Angle=0 Diameter=1 Mode=0
  profile: circle Circle_Diameter=0.75

Advanced link "BladePitch"
  input Pitch75R = (not in this file)
  output Pitch1 = (not in this file)
  output Pitch2 = (not in this file)
  output Pitch3 = (not in this file)
    Pitch1 = Pitch75R;
    Pitch2 = Pitch75R;
    Pitch3 = Pitch75R;
