OpenVSP model (file version 5), 19 components.
Geometry view with OpenVSP parameter names; values to 6 digits, angles in degrees, lengths in the model's unit.
Overall bounding box: X_Min=-0.463414 X_Len=33.0884 Y_Min=-4.57683 Y_Len=28.3268 Z_Min=3.25445 Z_Len=9.0711

Fuselage "Rotor_5_Support"
  location (X Y Z) 3.741 8.25 7.9, rotation -8 0 0
  bounding box size 8 1.02867 1.02867
  Design: Length=8
  cross sections:
    n  XLocPercent  YLocPercent  ZLocPercent  shape
    0  0            0            0            point
    1  0.25         0            0            circle Circle_Diameter=1
    2  0.5          0            0            as above
    3  0.75         0            0            as above
    4  1            0            0            point

Fuselage "Rotor_6_Support"
  location (X Y Z) 11.5 8.25 8, rotation -8 0 1.5
  bounding box size 7.99726 1.16659 1.04809
  Design: Length=8
  cross sections:
    n  XLocPercent  YLocPercent  ZLocPercent  shape
    0  0            0            0            point
    1  0.25         0            0            circle Circle_Diameter=1
    2  0.5          0            0            as above
    3  0.75         0            0            as above
    4  1            0            0            point

Fuselage "Rotor_7_Support"
  location (X Y Z) 4.2 18.75 7.6125, rotation 0 0 0
  bounding box size 8 1 1
  Design: Length=8
  cross sections:
    n  XLocPercent  YLocPercent  ZLocPercent  shape
    0  0            0            0            point
    1  0.25         0            0            circle Circle_Diameter=1
    2  0.5          0            0            as above
    3  0.75         0            0            as above
    4  1            0            0            point

Fuselage "Rotor_8_Support"
  location (X Y Z) 12 18.75 7.6125, rotation 0 0 0
  bounding box size 8 1 1
  Design: Length=8
  cross sections:
    n  XLocPercent  YLocPercent  ZLocPercent  shape
    0  0            0            0            point
    1  0.25         0            0            circle Circle_Diameter=1
    2  0.5          0            0            as above
    3  0.75         0            0            as above
    4  1            0            0            point

Propeller "Rotor_5_blades"
  location (X Y Z) 4.63 8.45 7.04, rotation -8 90 0
  bounding box size 10.1868 4.09674 0.907178
  Design: Diameter=10 NumBlade=2 Beta34=0 UseBeta34Flag=1 Feather=0 Rotate=90 Precone=0 ReverseFlag=0 FoldAngle=0 PropMode=0 AF=352.964 CLi=0 Chord=0.4873 Solidity=0.310225 ConstructXoC=0.25 FeatherAxisXoC=0.25 FeatherOffsetXoC=0
  cross sections:
    n  RadiusFrac  shape
    0  0.21        airfoil file "BOEING-VERTOL VR-12 AIRFOIL"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 BaseThickChord=0.106373 Chord=2.785 ThickChord=0.106373
    1  0.85        airfoil file "BOEING-VERTOL VR-12 AIRFOIL"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 BaseThickChord=0.106373 Chord=2.22034 ThickChord=0.106373
    2  0.95        airfoil file "SIKORSKY SSC-A09  AIRFOIL"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 BaseThickChord=0.0901604 Chord=2.13211 ThickChord=0.0902
    3  1           airfoil file "SIKORSKY SSC-A09  AIRFOIL"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 BaseThickChord=0.0901604 Chord=2.088 ThickChord=0.0902
  Chord along r/R (linear): 0.21: 0.557, 1: 0.4176
  Twist along r/R (PCHIP): 0.21: 8.1, 1: -3.75
  Thick along r/R (linear): 0.21: 0.106373, 0.85: 0.106373, 0.95: 0.0902, 1: 0.0902

Fuselage "Rotor_5_Hub", child of "Rotor_5_blades"
  location (X Y Z) 4.63 8.53698 7.65892, rotation -8 90 0; relative location -0.625 0 0, rotation 0 0 0
  bounding box size 2.25 2.37284 1.34302
  Design: Length=1
  cross sections:
    n  XLocPercent  YLocPercent  ZLocPercent  shape
    0  0            0            0            point
    1  0.11         0            0            circle Circle_Diameter=2.25
    2  0.5          0            0            as above
    3  0.89         0            0            as above
    4  1            0            0            point

Custom "Rotor_5_disk", child of "Rotor_5_blades"
  location (X Y Z) 4.63 8.45 7.04, rotation -8 90 0; relative location 0 0 0, rotation 0 0 0
  bounding box size 10 9.90268 1.39173
  Design: Diameter=10
  custom script Disk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

Propeller "Rotor_6_blades"
  location (X Y Z) 18.76 8.45 9.3, rotation -8 90 0
  bounding box size 10.1868 4.09674 0.907178
  Design: Diameter=10 NumBlade=2 Beta34=0 UseBeta34Flag=1 Feather=0 Rotate=90 Precone=0 ReverseFlag=1 FoldAngle=0 PropMode=0 AF=352.964 CLi=0 Chord=0.4873 Solidity=0.310225 ConstructXoC=0.25 FeatherAxisXoC=0.25 FeatherOffsetXoC=0
  cross sections:
    n  RadiusFrac  shape
    0  0.21        airfoil file "BOEING-VERTOL VR-12 AIRFOIL"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 BaseThickChord=0.106373 Chord=2.785 ThickChord=0.106373
    1  0.85        airfoil file "BOEING-VERTOL VR-12 AIRFOIL"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 BaseThickChord=0.106373 Chord=2.22034 ThickChord=0.106373
    2  0.95        airfoil file "SIKORSKY SSC-A09  AIRFOIL"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 BaseThickChord=0.0901604 Chord=2.13211 ThickChord=0.0902
    3  1           airfoil file "SIKORSKY SSC-A09  AIRFOIL"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 BaseThickChord=0.0901604 Chord=2.088 ThickChord=0.0902
  blade curves as in "Rotor_5_blades"

Fuselage "Rotor_6_Hub", child of "Rotor_6_blades"
  location (X Y Z) 18.76 8.53698 9.91892, rotation -8 90 0; relative location -0.625 0 0, rotation 0 0 0
  bounding box size 2.25 2.37284 1.34302
  Design: Length=1
  cross sections:
    n  XLocPercent  YLocPercent  ZLocPercent  shape
    0  0            0            0            point
    1  0.11         0            0            circle Circle_Diameter=2.25
    2  0.5          0            0            as above
    3  0.89         0            0            as above
    4  1            0            0            point

Custom "Rotor_6_disk", child of "Rotor_6_blades"
  location (X Y Z) 18.76 8.45 9.3, rotation -8 90 0; relative location 0 0 0, rotation 0 0 0
  bounding box size 10 9.90268 1.39173
  Design: Diameter=10
  custom script Disk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

Propeller "Rotor_7_blades"
  location (X Y Z) 5.07 18.75 6.73, rotation 0 90 0
  bounding box size 10.1868 4.137 0.535717
  Design: Diameter=10 NumBlade=2 Beta34=0 UseBeta34Flag=1 Feather=0 Rotate=90 Precone=0 ReverseFlag=1 FoldAngle=0 PropMode=0 AF=352.964 CLi=0 Chord=0.4873 Solidity=0.310225 ConstructXoC=0.25 FeatherAxisXoC=0.25 FeatherOffsetXoC=0
  cross sections:
    n  RadiusFrac  shape
    0  0.21        airfoil file "BOEING-VERTOL VR-12 AIRFOIL"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 BaseThickChord=0.106373 Chord=2.785 ThickChord=0.106373
    1  0.85        airfoil file "BOEING-VERTOL VR-12 AIRFOIL"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 BaseThickChord=0.106373 Chord=2.22034 ThickChord=0.106373
    2  0.95        airfoil file "SIKORSKY SSC-A09  AIRFOIL"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 BaseThickChord=0.0901604 Chord=2.13211 ThickChord=0.0902
    3  1           airfoil file "SIKORSKY SSC-A09  AIRFOIL"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 BaseThickChord=0.0901604 Chord=2.088 ThickChord=0.0902
  blade curves as in "Rotor_5_blades"

Fuselage "Rotor_7_Hub", child of "Rotor_7_blades"
  location (X Y Z) 5.07 18.75 7.355, rotation 0 90 0; relative location -0.625 0 0, rotation 0 0 0
  bounding box size 2.25 2.25 1.04
  Design: Length=1
  cross sections:
    n  XLocPercent  YLocPercent  ZLocPercent  shape
    0  0            0            0            point
    1  0.11         0            0            circle Circle_Diameter=2.25
    2  0.5          0            0            as above
    3  0.89         0            0            as above
    4  1            0            0            point

Custom "Rotor_7_disk", child of "Rotor_7_blades"
  location (X Y Z) 5.07 18.75 6.73, rotation 0 90 0; relative location 0 0 0, rotation 0 0 0
  bounding box size 10 10 0
  Design: Diameter=10
  custom script Disk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

Propeller "Rotor_8_blades"
  location (X Y Z) 19.2 18.75 9.01, rotation 0 90 0
  bounding box size 10.1868 4.137 0.535717
  Design: Diameter=10 NumBlade=2 Beta34=0 UseBeta34Flag=1 Feather=0 Rotate=90 Precone=0 ReverseFlag=0 FoldAngle=0 PropMode=0 AF=352.964 CLi=0 Chord=0.4873 Solidity=0.310225 ConstructXoC=0.25 FeatherAxisXoC=0.25 FeatherOffsetXoC=0
  cross sections:
    n  RadiusFrac  shape
    0  0.21        airfoil file "BOEING-VERTOL VR-12 AIRFOIL"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 BaseThickChord=0.106373 Chord=2.785 ThickChord=0.106373
    1  0.85        airfoil file "BOEING-VERTOL VR-12 AIRFOIL"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 BaseThickChord=0.106373 Chord=2.22034 ThickChord=0.106373
    2  0.95        airfoil file "SIKORSKY SSC-A09  AIRFOIL"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 BaseThickChord=0.0901604 Chord=2.13211 ThickChord=0.0902
    3  1           airfoil file "SIKORSKY SSC-A09  AIRFOIL"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 BaseThickChord=0.0901604 Chord=2.088 ThickChord=0.0902
  blade curves as in "Rotor_5_blades"

Fuselage "Rotor_8_Hub", child of "Rotor_8_blades"
  location (X Y Z) 19.2 18.75 9.635, rotation 0 90 0; relative location -0.625 0 0, rotation 0 0 0
  bounding box size 2.25 2.25 1.04
  Design: Length=1
  cross sections:
    n  XLocPercent  YLocPercent  ZLocPercent  shape
    0  0            0            0            point
    1  0.11         0            0            circle Circle_Diameter=2.25
    2  0.5          0            0            as above
    3  0.89         0            0            as above
    4  1            0            0            point

Custom "Rotor_8_disk", child of "Rotor_8_blades"
  location (X Y Z) 19.2 18.75 9.01, rotation 0 90 0; relative location 0 0 0, rotation 0 0 0
  bounding box size 10 10 0
  Design: Diameter=10
  custom script Disk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

Propeller "Rotor_9_blades"
  location (X Y Z) 31.94 0 7.79, rotation 0 0 0
  bounding box size 0.813661 9.15366 9.0711
  Design: Diameter=9 NumBlade=6 Beta34=0 UseBeta34Flag=1 Feather=-0.42 Rotate=0 Precone=0 ReverseFlag=0 FoldAngle=0 PropMode=0 AF=322.402 CLi=0.538476 Chord=0.44505 Solidity=0.849983 ConstructXoC=0.25 FeatherAxisXoC=0.25 FeatherOffsetXoC=0
  cross sections:
    n  RadiusFrac  shape
    0  0.21        airfoil file "BOEING-VERTOL VR-12 AIRFOIL"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 BaseThickChord=0.106373 Chord=2.2887 ThickChord=0.1064
    1  0.85        airfoil file "BOEING-VERTOL VR-12 AIRFOIL"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 BaseThickChord=0.106373 Chord=1.82535 ThickChord=0.1064
    2  0.95        airfoil file "SIKORSKY SSC-A09  AIRFOIL"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 BaseThickChord=0.0901604 Chord=1.75295 ThickChord=0.0902
    3  1           airfoil file "SIKORSKY SSC-A09  AIRFOIL"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 BaseThickChord=0.0901604 Chord=1.71675 ThickChord=0.0902
  Chord along r/R (linear): 0.21: 0.5086, 1: 0.3815
  Twist along r/R (linear): 0.21: 19.32, 1: -8.33
  Thick along r/R (linear): 0.21: 0.1064, 0.85: 0.1064, 0.95: 0.0902, 1: 0.0902
  CLI along r/R (cubic Bezier): 0.21: 0, 0.273333: 0.7, 0.336667: 0.7, 0.4: 0.7, 0.466667: 0.7, 0.533333: 0.7, 0.6: 0.7, 0.733333: 0.7, 0.866667: 0.7, 1: 0.2

Fuselage "Rotor_9_Hub", child of "Rotor_9_blades"
  location (X Y Z) 31.625 0 7.79, rotation 0 0 0; relative location -0.315 0 0, rotation 0 0 0
  bounding box size 1.03333 1.5 1.5
  Design: Length=1
  cross sections:
    n  XLocPercent  YLocPercent  ZLocPercent  shape
    0  0            0            0            point
    1  0.125        0            0            circle Circle_Diameter=1.5
    2  0.6          0            0            as above
    3  1            0            0            point

Custom "Rotor-9-disk", child of "Rotor_9_blades"
  location (X Y Z) 31.94 0 7.79, rotation 0 0 0; relative location 0 0 0, rotation 0 0 0
  bounding box size 0 9 9
  Design: Diameter=9
  custom script Disk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

Advanced link "BladePitch"
  input Pitch75R = (not in this file)
  output Pitch1 = (not in this file)
  output Pitch2 = (not in this file)
  output Pitch3 = (not in this file)
    Pitch1 = Pitch75R;
    Pitch2 = Pitch75R;
    Pitch3 = Pitch75R;
