OpenVSP model (file version 5), 3 components.
Geometry view with OpenVSP parameter names; values to 6 digits, angles in degrees, lengths in the model's unit.
Overall bounding box: X_Min=8.89216 X_Len=23.1725 Y_Min=-25.2496 Y_Len=50.4992 Z_Min=7.50146 Z_Len=6.4094

Wing "Wing_1"
  location (X Y Z) 8.89 0 8.5, rotation 0 0 0
  symmetric about XZ
  bounding box size 5.43998 50.4992 1.63149
  totals: TotalSpan=50.53 TotalProjectedSpan=50.4992 TotalChord=3.38 TotalArea=210.278 TotalAR=12.1276 RelativeTwistFlag=1
  root: chord 5.44328, twist 2, airfoil file "NASA/LANGLEY LS(1)-0417 (GA(W)-1) AIRFOIL"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 BaseThickChord=0.16998 ThickChord=0.16998
  sections:
    n  Span     Root_Chord  Tip_Chord  Area     Sweep    Sweep_Location  Dihedral  Twist  Twist_Location  tip airfoil
    1  14.745   5.44328     4.13083    70.5852  0        0.7             -2        -0.5   0.7             as above
    2  6.62693  4.13083     3.30466    24.6373  0        0.7             -2        -0.5   0.7             as above
    3  2.08309  3.30466     2.84088    6.40087  3.63636  0.7             -2        -0.5   0.7             as above
    4  1.80996  2.84088     1.04396    3.5157   8        0.7             -2        -0.5   0.7             as above

Wing "Tail_2"
  location (X Y Z) 20.843 0 8.23086, rotation 90 0 0
  bounding box size 11.2217 1.12017 5.68
  totals: TotalSpan=5.68 TotalProjectedSpan=5.68 TotalChord=5.55 TotalArea=27.3432 TotalAR=1.1799
  root: chord 9.73719, twist 0, NACA 4-series Camber=0 CamberLoc=0.2 ThickChord=0.115
  sections:
    n  Span      Root_Chord  Tip_Chord  Area     Sweep  Sweep_Location  Dihedral  Twist  Twist_Location  tip airfoil
    1  1.14165   9.73719     5.94823    8.95367  15     1               0         0      0.25            NACA 4-series Camber=0 CamberLoc=0.2 ThickChord=0.14
    2  0.42729   5.94823     5.26478    2.39561  15     1               0         0      0.25            NACA 4-series Camber=0 CamberLoc=0.2 ThickChord=0.15
    3  0.520148  5.26478     4.78439    2.61353  15     1               0         0      0.25            as above
    4  3.59091   4.78439     2.66802    13.3804  15     1               0         0      0.25            NACA 4-series Camber=0 CamberLoc=0.2 ThickChord=0.115

Wing "Tail_1"
  location (X Y Z) 27.4277 0 8.00806, rotation 0 0 0
  symmetric about XZ
  bounding box size 3.75888 13.04 0.568655
  totals: TotalSpan=13.04 TotalProjectedSpan=13.04 TotalChord=3.03 TotalArea=39.5112 TotalAR=4.30363
  root: chord 3.7875, twist 0, NACA 4-series Camber=0 CamberLoc=0.2 ThickChord=0.15
  sections:
    n  Span  Root_Chord  Tip_Chord  Area     Sweep  Sweep_Location  Dihedral  Twist  Twist_Location  tip airfoil
    1  6.52  3.7875      2.2725     19.7556  0      0.25            0         0      0.25            as above

Advanced link "BladePitch"
  input Pitch75R = (not in this file)
  output Pitch1 = (not in this file)
  output Pitch2 = (not in this file)
  output Pitch3 = (not in this file)
    Pitch1 = Pitch75R;
    Pitch2 = Pitch75R;
    Pitch3 = Pitch75R;
