OpenVSP model (file version 4), 36 components.
Geometry view with OpenVSP parameter names; values to 6 digits, angles in degrees, lengths in the model's unit.
Overall bounding box: X_Min=0 X_Len=479 Y_Min=-235.611 Y_Len=471.222 Z_Min=0 Z_Len=242.024

Stack "Fuselage"
  location (X Y Z) 87.842 0 99.2846, rotation 0 0 0
  bounding box size 368.738 43.4585 67.3001
  cross sections:
    n  XDelta   YDelta  ZDelta     shape
    0  0        0       0          point
    1  39.0529  0       2.25866    general fuselage BotStr=0.83 BotTanAngle=90 CornerRad=0 Height=38.7129 LowStr=0.715364 MaxWidthLoc=0 TopStr=1.03977 TopTanAngle=90 UpStr=0.465818 Width=30
    2  97.2778  0       9.79154    general fuselage BotStr=0.890045 BotTanAngle=90 CornerRad=0 Height=61 LowStr=0.598909 MaxWidthLoc=-0.0636364 TopStr=0.923318 TopTanAngle=90 UpStr=0.324409 Width=35
    3  139.74   0       0          general fuselage BotStr=0.8235 BotTanAngle=90 CornerRad=0 Height=59 LowStr=0.490773 MaxWidthLoc=0 TopStr=0.83 TopTanAngle=90 UpStr=0.524045 Width=35
    4  88.2451  0       7.06323    ellipse Ellipse_Height=16.7228 Ellipse_Width=5.96903
    5  3.93664  0       -0.060171  point
  SS_Rectangle "SS_RECT_0": Center_U=0.233696 Center_W=0.75 U_Length=0.0597826 W_Length=0.445652

Custom "Pilot", child of "Fuselage"
  location (X Y Z) 173.5 0 133, rotation 0 -63 -180; relative location 85.658 0 33.7154, rotation 0 -63 -180
  bounding box size 52.7464 22.9318 47.5851
  Angles: Head_XAng=0 Head_YAng=0 Head_ZAng=0 LL_Arm_XAng=0 LL_Arm_YAng=65 LL_Leg_YAng=-89 LR_Arm_XAng=0 LR_Arm_YAng=65 LR_Leg_YAng=-89 L_Foot_XAng=0 L_Foot_YAng=-23 L_Foot_ZAng=0 L_Hand_ZAng=0 R_Foot_XAng=0 R_Foot_YAng=-23 R_Foot_ZAng=0 R_Hand_ZAng=0 UL_Arm_YAng=0 UL_Arm_ZAng=0 UL_Leg_YAng=85 UL_Leg_ZAng=0 UR_Arm_YAng=0 UR_Arm_ZAng=0 UR_Leg_YAng=85 UR_Leg_ZAng=0
  Design: Height=6 Trigger=0 UnitMult=0.0393701 Units=0
  custom script Male95Pct1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

Custom "Pax1", child of "Fuselage"
  location (X Y Z) 183.5 0 133, rotation 0 63 0
  bounding box size 52.7464 22.9318 47.5851
  Angles: Head_XAng=0 Head_YAng=0 Head_ZAng=0 LL_Arm_XAng=0 LL_Arm_YAng=65 LL_Leg_YAng=-89 LR_Arm_XAng=0 LR_Arm_YAng=65 LR_Leg_YAng=-89 L_Foot_XAng=0 L_Foot_YAng=-23 L_Foot_ZAng=0 L_Hand_ZAng=0 R_Foot_XAng=0 R_Foot_YAng=-23 R_Foot_ZAng=0 R_Hand_ZAng=0 UL_Arm_YAng=0 UL_Arm_ZAng=0 UL_Leg_YAng=85 UL_Leg_ZAng=0 UR_Arm_YAng=0 UR_Arm_ZAng=0 UR_Leg_YAng=85 UR_Leg_ZAng=0
  Design: Height=6 Trigger=0 UnitMult=0.0393701 Units=0
  custom script Male95Pct1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

Custom "Pax2", child of "Fuselage"
  location (X Y Z) 283 0 133, rotation 0 -63 -180
  bounding box size 52.7464 22.9318 47.5851
  Angles: Head_XAng=0 Head_YAng=0 Head_ZAng=0 LL_Arm_XAng=0 LL_Arm_YAng=65 LL_Leg_YAng=-89 LR_Arm_XAng=0 LR_Arm_YAng=65 LR_Leg_YAng=-89 L_Foot_XAng=0 L_Foot_YAng=-23 L_Foot_ZAng=0 L_Hand_ZAng=0 R_Foot_XAng=0 R_Foot_YAng=-23 R_Foot_ZAng=0 R_Hand_ZAng=0 UL_Arm_YAng=0 UL_Arm_ZAng=0 UL_Leg_YAng=85 UL_Leg_ZAng=0 UR_Arm_YAng=0 UR_Arm_ZAng=0 UR_Leg_YAng=85 UR_Leg_ZAng=0
  Design: Height=6 Trigger=0 UnitMult=0.0393701 Units=0
  custom script Male95Pct1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

Custom "Pax3", child of "Fuselage"
  location (X Y Z) 291.5 0 133, rotation 0 63 0
  bounding box size 52.7464 22.9318 47.5851
  Angles: Head_XAng=0 Head_YAng=0 Head_ZAng=0 LL_Arm_XAng=0 LL_Arm_YAng=65 LL_Leg_YAng=-89 LR_Arm_XAng=0 LR_Arm_YAng=65 LR_Leg_YAng=-89 L_Foot_XAng=0 L_Foot_YAng=-23 L_Foot_ZAng=0 L_Hand_ZAng=0 R_Foot_XAng=0 R_Foot_YAng=-23 R_Foot_ZAng=0 R_Hand_ZAng=0 UL_Arm_YAng=0 UL_Arm_ZAng=0 UL_Leg_YAng=85 UL_Leg_ZAng=0 UR_Arm_YAng=0 UR_Arm_ZAng=0 UR_Leg_YAng=85 UR_Leg_ZAng=0
  Design: Height=6 Trigger=0 UnitMult=0.0393701 Units=0
  custom script Male95Pct1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

Custom "Pax4", child of "Fuselage"
  location (X Y Z) 390.5 0 133, rotation 0 -63 -180
  bounding box size 52.7464 22.9318 47.5851
  Angles: Head_XAng=0 Head_YAng=0 Head_ZAng=0 LL_Arm_XAng=0 LL_Arm_YAng=65 LL_Leg_YAng=-89 LR_Arm_XAng=0 LR_Arm_YAng=65 LR_Leg_YAng=-89 L_Foot_XAng=0 L_Foot_YAng=-23 L_Foot_ZAng=0 L_Hand_ZAng=0 R_Foot_XAng=0 R_Foot_YAng=-23 R_Foot_ZAng=0 R_Hand_ZAng=0 UL_Arm_YAng=0 UL_Arm_ZAng=0 UL_Leg_YAng=85 UL_Leg_ZAng=0 UR_Arm_YAng=0 UR_Arm_ZAng=0 UR_Leg_YAng=85 UR_Leg_ZAng=0
  Design: Height=6 Trigger=0 UnitMult=0.0393701 Units=0
  custom script Male95Pct1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

Fuselage "Tire", child of "Fuselage"
  location (X Y Z) 180 -2 80, rotation 0 0 90; relative location 92.158 -2 -19.2846, rotation 0 0 90
  bounding box size 15 4 15
  Design: Length=4
  cross sections:
    n  XLocPercent  YLocPercent  ZLocPercent  shape
    0  0            0            0            point
    1  0            0            0            circle Circle_Diameter=15
    2  1            0            0            as above
    3  1            0            0            point

Wing "FrontWing"
  location (X Y Z) 161 0 132, rotation 0 0 0
  symmetric about XZ
  bounding box size 61.6419 216.756 13.5014
  totals: TotalSpan=217.441 TotalProjectedSpan=216.756 TotalChord=42.0925 TotalArea=8691.11 TotalAR=5.4059
  root: chord 45.33, twist 1.13723, NACA 65-series A=0.6 IdealCl=0.55 ThickChord=0.157
  sections:
    n  Span     Root_Chord  Tip_Chord  Area     Sweep  Sweep_Location  Dihedral  Twist    Twist_Location  tip airfoil
    1  18.7206  45.33       45.33      848.606  0      0               0         1.13723  0.25            as above
    2  90       45.33       32.38      3496.95  18     0               5         0.76225  0.25            as above
  SS_Control "SS_CONT_0": UStart=0.530488 UEnd=0.719512 Length_C_Start=0.33 Length_C_End=0.33 Length_Start=14.4377 Length_End=11.2065 LE_Flag=0 Surf_Type=2

Fuselage "InbdBoom", child of "FrontWing"
  location (X Y Z) 112.571 117 143, rotation 0 0 0; relative location -48.429 117 11, rotation 0 0 0
  symmetric about XZ
  bounding box size 350 272.478 38.4785
  Design: Length=350
  cross sections:
    n  XLocPercent  YLocPercent  ZLocPercent  shape
    0  0            0            0            point
    1  0.25         0            0            general fuselage BotStr=0.25 BotTanAngle=90 CornerRad=0.25 Height=31 LowStr=0 MaxWidthLoc=0 TopStr=1.25 TopTanAngle=90 UpStr=0.83 Width=31
    2  0.5          0            -0.00575     general fuselage BotStr=0.25 BotTanAngle=90 CornerRad=0.409091 Height=27 LowStr=0 MaxWidthLoc=0.25 TopStr=1.25 TopTanAngle=90 UpStr=0.83 Width=31
    3  0.82         0            -0.0075      general fuselage BotStr=0.25 BotTanAngle=90 CornerRad=0.25 Height=25 LowStr=0 MaxWidthLoc=0.25 TopStr=1.25 TopTanAngle=90 UpStr=0.83 Width=31
    4  1            0            0            point

Fuselage "otbdBattery2023_opt4", child of "InbdBoom"
  location (X Y Z) 277 124 146.451, rotation 90 0 0; relative location 164.429 7 3.451, rotation 90 0 0
  symmetric about XZ
  bounding box size 134.5 261.5 5.5
  mass: Density=0.03191 Shell_Flag=0 Mass_Area=1 Mass_Prior=0
  Design: Length=134.5
  cross sections:
    n  XLocPercent  YLocPercent  ZLocPercent  shape
    0  0            0            0            point
    1  0            0            0            rounded rectangle RoundRectXSec_Radius=0 RoundedRect_Height=13.5 RoundedRect_Width=5.5
    2  0.5          0            0            as above
    3  1            0            0            as above
    4  1            0            0            point

Fuselage "inbdBattery2023_opt4", child of "InbdBoom"
  location (X Y Z) 277 110 146.451, rotation -90 0 0; relative location 164.429 -7 3.451, rotation -90 0 0
  symmetric about XZ
  bounding box size 134.5 233.5 5.5
  mass: Density=0.03191 Shell_Flag=0 Mass_Area=1 Mass_Prior=0
  Design: Length=134.5
  cross sections:
    n  XLocPercent  YLocPercent  ZLocPercent  shape
    0  0            0            0            point
    1  0            0            0            rounded rectangle RoundRectXSec_Radius=0 RoundedRect_Height=13.5 RoundedRect_Width=5.5
    2  0.5          0            0            as above
    3  1            0            0            as above
    4  1            0            0            point

Hinge "gearPivot", child of "InbdBoom"
  location (X Y Z) 335 117 130.75, rotation 0 0 0
  Hinge: JointRotMax=90 JointRotMaxFlag=1 JointRotMin=0 JointRotMinFlag=1 JointRotate=0 JointRotateFlag=1 JointTransMax=1000 JointTransMaxFlag=0 JointTransMin=-1000 JointTransMinFlag=0 JointTranslate=0 JointTranslateFlag=0 OrientRotFlag=0 PrimOffAbsRelFlag=1 PrimType=0 PrimULoc=0 PrimVecAbsRelFlag=1 PrimWLoc=0 PrimXOff=0 PrimXOffRel=0 PrimXVec=0 PrimXVecRel=0 PrimYOff=0 PrimYOffRel=0 PrimYVec=1 PrimYVecRel=1 PrimZOff=0 PrimZOffRel=0 PrimZVec=0 PrimZVecRel=0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

Custom "StrutGear", child of "gearPivot"
  location (X Y Z) 335 117 130.75, rotation 90 0 0; relative location 0 0 0, rotation 90 0 0
  symmetric about XZ
  bounding box size 58.25 256 16.1914
  Design: PresetTrigger=0 StrutDiameter=4 StrutLength=49.25 TireDiameter=22 TireSelect=2 TireThickness=7.7 UnitMult=1 Units=0 WheelDiameter=9 WhlFlag=0
  custom script StrutGear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

Custom "ElecActuator", child of "InbdBoom"
  location (X Y Z) 199 119 136.451, rotation 12.5 -90 0; relative location 86.429 2 -6.549, rotation 12.5 -90 0
  symmetric about XZ
  bounding box size 10 247.763 23.2108
  Design: MotorDiameter=10 MotorLength=10 ShaftDiameter=3 ShaftLength=12.3333
  custom script ElectricMotor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

Hinge "fwdTranslate", child of "ElecActuator"
  location (X Y Z) 199 114.166 158.255, rotation 12.5 -90 0; relative location 22.333 0 0, rotation 0 0 0
  Hinge: JointRotMax=360 JointRotMaxFlag=0 JointRotMin=-360 JointRotMinFlag=0 JointRotate=0 JointRotateFlag=0 JointTransMax=13.75 JointTransMaxFlag=1 JointTransMin=0 JointTransMinFlag=1 JointTranslate=0 JointTranslateFlag=1 OrientRotFlag=0 PrimOffAbsRelFlag=1 PrimType=0 PrimULoc=0 PrimVecAbsRelFlag=1 PrimWLoc=0 PrimXOff=0 PrimXOffRel=0 PrimXVec=0 PrimXVecRel=1 PrimYOff=0 PrimYOffRel=0 PrimYVec=-0.21644 PrimYVecRel=0 PrimZOff=0 PrimZOffRel=0 PrimZVec=0.976296 PrimZVecRel=0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

Propeller "TopProp", child of "fwdTranslate"
  location (X Y Z) 199 114.924 154.838, rotation -167.5 -90 0; relative location -3.5 0 0, rotation 0 0 180
  symmetric about XZ
  bounding box size 148.482 242.216 6.85462
  Design: Diameter=147.36 NumBlade=2 Beta34=8 UseBeta34Flag=1 Feather=-12 Rotate=92 ReverseFlag=0 FoldAngle=0 AF=108.371 ConstructXoC=0.5
  cross sections:
    n  RadiusFrac  shape
    0  0.16        NACA 4-series Camber=0 CamberLoc=0 Chord=13.2405 ThickChord=0.12
    1  0.45        NACA 4-series Camber=0.05 CamberLoc=0.4 Chord=12.1156 ThickChord=0.12
    2  0.7         NACA 4-series Camber=0.05 CamberLoc=0.4 Chord=10.7682 ThickChord=0.12
    3  1           NACA 4-series Camber=0.05 CamberLoc=0.4 Chord=8.8416 ThickChord=0.12
  Chord along r/R (cubic Bezier): 0.16: 0.179703, 0.323333: 0.170807, 0.486667: 0.164596, 0.65: 0.15, 0.766667: 0.139752, 0.883333: 0.139752, 1: 0.12
  Twist along r/R (PCHIP): 0.16: 30, 0.75: 20, 1: 10
  Rake along r/R (linear): 0.16: 0, 0.65: 0, 0.9: 0.018, 1: 0.025
  Skew along r/R (linear): 0.16: 0, 1: 0.03

Fuselage "HalbachMotor", child of "TopProp"
  location (X Y Z) 199 114.477 156.854, rotation -167.5 -90 0; relative location -2.06522 0 0, rotation 0 0 0
  symmetric about XZ
  bounding box size 24 254.116 9.09973
  Design: Length=4
  cross sections:
    n  XLocPercent  YLocPercent  ZLocPercent  shape
    0  0            0            0            point
    1  0            0            0            circle Circle_Diameter=24
    2  0.5          0            0            as above
    3  1            0            0            as above
    4  1            0            0            point

Fuselage "Hub", child of "TopProp"
  location (X Y Z) 199 114.329 157.522, rotation -167.5 -90 0; relative location -2.75 0 0, rotation 0 0 0
  symmetric about XZ
  bounding box size 28 258.362 11.5749
  Design: Length=5.29545
  cross sections:
    n  XLocPercent  YLocPercent  ZLocPercent  shape
    0  0            0            0            point
    1  0.1          0            0            circle Circle_Diameter=28
    2  0.5          0            0            as above
    3  0.9          0            0            as above
    4  1            0            0            point

Propeller "BottomProp", child of "TopProp"
  location (X Y Z) 199 116.872 146.051, rotation -167.5 -90 0; relative location 9 0 0, rotation 0 0 0
  symmetric about XZ
  bounding box size 144.313 251.009 10.5599
  Design: Diameter=140 NumBlade=2 Beta34=20 UseBeta34Flag=1 Feather=0 Rotate=79.5 ReverseFlag=0 FoldAngle=0 AF=100.604 ConstructXoC=0.5
  cross sections:
    n  RadiusFrac  shape
    0  0.175       NACA 4-series Camber=0 CamberLoc=0 Chord=11.879 ThickChord=0.12
    1  0.45        NACA 4-series Camber=0.05 CamberLoc=0.4 Chord=10.8364 ThickChord=0.12
    2  0.7         NACA 4-series Camber=0.05 CamberLoc=0.4 Chord=9.53031 ThickChord=0.12
    3  1           NACA 4-series Camber=0.05 CamberLoc=0.4 Chord=7.7 ThickChord=0.12
  Chord along r/R (cubic Bezier): 0.175: 0.1697, 0.333333: 0.16081, 0.491667: 0.1546, 0.65: 0.14, 0.766667: 0.12975, 0.883333: 0.12975, 1: 0.11
  Twist along r/R (PCHIP): 0.175: 35, 0.75: 20, 1: 10
  Rake along r/R (linear): 0.175: -0.04, 0.4999: -0.03, 0.75: -0.03, 1: -0.04
  Skew along r/R (linear): 0.175: 0, 1: -0.2

Fuselage "HalbachMotor", child of "BottomProp"
  location (X Y Z) 199 116.006 149.956, rotation -167.5 -90 0; relative location -4 0 0, rotation 0 0 0
  symmetric about XZ
  bounding box size 24 257.175 9.09973
  Design: Length=4
  cross sections:
    n  XLocPercent  YLocPercent  ZLocPercent  shape
    0  0            0            0            point
    1  0            0            0            circle Circle_Diameter=24
    2  0.5          0            0            as above
    3  1            0            0            as above
    4  1            0            0            point

Fuselage "Hub", child of "BottomProp"
  location (X Y Z) 199 115.453 152.45, rotation -167.5 -90 0; relative location -6.55435 0 0, rotation 0 0 0
  symmetric about XZ
  bounding box size 28 261.821 14.3914
  Design: Length=8
  cross sections:
    n  XLocPercent  YLocPercent  ZLocPercent  shape
    0  0            0            0            point
    1  0.1          0            0            circle Circle_Diameter=28
    2  0.5          0            0            as above
    3  0.9          0            0            as above
    4  1            0            0            point

Wing "AftWing"
  location (X Y Z) 310 0 135, rotation 0 0 0
  symmetric about XZ
  bounding box size 95.7213 427.441 7.20194
  totals: TotalSpan=427.441 TotalProjectedSpan=427.441 TotalChord=41.1794 TotalArea=16850.7 TotalAR=10.8427
  root: chord 45.33, twist 3.28943, NACA 65-series A=0.6 IdealCl=0.55 ThickChord=0.157
  sections:
    n  Span     Root_Chord  Tip_Chord  Area     Sweep  Sweep_Location  Dihedral  Twist    Twist_Location  tip airfoil
    1  18.7206  45.33       45.33      848.606  0      0               0         3.28943  0.25            as above
    2  90       45.33       39.3531    3810.74  18     0               0         3.83557  0.25            as above
    3  105      39.3531     32.38      3765.99  18     0               0         2.12802  0.25            as above
  SS_Control "SS_CONT_0": UStart=0.408537 UEnd=0.579268 Length_C_Start=0.33 Length_C_End=0.33 Length_Start=14.8747 Length_End=13.1909 LE_Flag=0 Surf_Type=2
  SS_Control "SS_CONT_1": UStart=0.78 UEnd=0.652439 Length_C_Start=0.33 Length_C_End=0.33 Length_Start=10.915 Length_End=12.3822 LE_Flag=0 Surf_Type=2

Wing "Vertical", child of "AftWing"
  location (X Y Z) 339 0 133, rotation 90 0 0; relative location 29 0 -2, rotation 90 0 0
  bounding box size 59 8.85282 60
  totals: TotalSpan=60 TotalProjectedSpan=60 TotalChord=42.5 TotalArea=2550 TotalAR=1.41176
  root: chord 59, twist 0, NACA 4-series Camber=0 CamberLoc=0.2 ThickChord=0.15
  sections:
    n  Span  Root_Chord  Tip_Chord  Area  Sweep  Sweep_Location  Dihedral  Twist  Twist_Location  tip airfoil
    1  60    59          26         2550  1      0               0         0      0.25            as above
  SS_Control "SS_CONT_0": UStart=0.384146 UEnd=0.603659 Length_C_Start=0.378049 Length_C_End=0.378049 Length_Start=20.4031 Length_End=12.1875 LE_Flag=0 Surf_Type=2

Propeller "CrzProp", child of "Vertical"
  location (X Y Z) 326.047 0 193, rotation 0 0 0; relative location -14 0 0, rotation 0 0 0
  bounding box size 8.77941 93.7161 90.4538
  Design: Diameter=96 NumBlade=5 Beta34=43.1571 UseBeta34Flag=0 Feather=0 Rotate=-20 ReverseFlag=0 FoldAngle=0 AF=121.924 ConstructXoC=0.5
  cross sections:
    n  RadiusFrac  shape
    0  0.1         circle Circle_Diameter=3.36
    1  0.3         NACA 4-series Camber=0.05 CamberLoc=0.4 Chord=9.552 ThickChord=0.12
    2  0.45        NACA 4-series Camber=0.05 CamberLoc=0.4 Chord=8.95749 ThickChord=0.12
    3  0.7         NACA 4-series Camber=0.05 CamberLoc=0.4 Chord=7.96663 ThickChord=0.05
    4  1           NACA 4-series Camber=0.01 CamberLoc=0.4 Chord=6.7776 ThickChord=0.03
  Chord along r/R (linear): 0.1: 0.07, 0.3: 0.199, 1: 0.1412
  Twist along r/R (linear): 0.1: 66.3, 0.3: 66.3, 1: 30.3

Custom "ElectricMotor", child of "CrzProp"
  location (X Y Z) 342.047 0 193, rotation -180 0 -180; relative location 16 0 0, rotation 0 180 0
  bounding box size 17 16.5 16.5
  Design: MotorDiameter=16.5 MotorLength=10 ShaftDiameter=3 ShaftLength=7
  custom script ElectricMotor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

Stack "Nacelle", child of "CrzProp"
  location (X Y Z) 306.047 0 193, rotation 0 0 0; relative location -20 0 0, rotation 0 0 0
  bounding box size 68.1803 18 18
  cross sections:
    n  XDelta   YDelta  ZDelta  shape
    0  0        0       0       point
    1  32       0       0       circle Circle_Diameter=18
    2  11.1803  0       0       circle Circle_Diameter=17
    3  25       0       0       point

Fuselage "TipBoom", child of "AftWing"
  location (X Y Z) 294 219.8 141, rotation 0 0 0; relative location -16 219.8 6, rotation 0 0 0
  symmetric about XZ
  bounding box size 185 471.222 29.1889
  Design: Length=185
  cross sections:
    n  XLocPercent  YLocPercent  ZLocPercent  shape
    0  0            0            0            point
    1  0.25         0            0.0025       general fuselage BotStr=0.25 BotTanAngle=90 CornerRad=0.409091 Height=27 LowStr=0 MaxWidthLoc=0.25 TopStr=1.25 TopTanAngle=90 UpStr=0.83 Width=31
    2  0.475        0            0.005        general fuselage BotStr=0.25 BotTanAngle=90 CornerRad=0.409091 Height=29 LowStr=0 MaxWidthLoc=0.25 TopStr=1.25 TopTanAngle=90 UpStr=0.83 Width=33
    3  0.82         0            0.015        general fuselage BotStr=0.25 BotTanAngle=90 CornerRad=0.409091 Height=17 LowStr=0 MaxWidthLoc=0.25 TopStr=1.25 TopTanAngle=90 UpStr=0.83 Width=22
    4  1            0            0.025        point

Custom "ElecActuator", child of "TipBoom"
  location (X Y Z) 384 222.05 133.951, rotation 12.5 -90 0; relative location 90 2.25 -7.049, rotation 12.5 -90 0
  symmetric about XZ
  bounding box size 10 453.863 23.2105
  Design: MotorDiameter=10 MotorLength=10 ShaftDiameter=3 ShaftLength=12.333
  custom script ElectricMotor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

Hinge "aftTranslate", child of "ElecActuator"
  location (X Y Z) 384 217.216 155.755, rotation 12.5 -90 0; relative location 22.333 0 0, rotation 0 0 0
  Hinge: JointRotMax=360 JointRotMaxFlag=0 JointRotMin=-360 JointRotMinFlag=0 JointRotate=0 JointRotateFlag=0 JointTransMax=13.75 JointTransMaxFlag=1 JointTransMin=0 JointTransMinFlag=1 JointTranslate=0 JointTranslateFlag=1 OrientRotFlag=0 PrimOffAbsRelFlag=1 PrimType=0 PrimULoc=0 PrimVecAbsRelFlag=1 PrimWLoc=0 PrimXOff=0 PrimXOffRel=0 PrimXVec=0 PrimXVecRel=1 PrimYOff=0 PrimYOffRel=0 PrimYVec=-0.21644 PrimYVecRel=0 PrimZOff=0 PrimZOffRel=0 PrimZVec=0.976296 PrimZVecRel=0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

Propeller "TopProp", child of "aftTranslate"
  location (X Y Z) 384 217.974 152.338, rotation -167.5 -90 0; relative location -3.5 0 0, rotation 0 0 180
  symmetric about XZ
  bounding box size 148.482 448.316 6.85462
  Design: Diameter=147.36 NumBlade=2 Beta34=8 UseBeta34Flag=1 Feather=-12 Rotate=92 ReverseFlag=0 FoldAngle=0 AF=108.371 ConstructXoC=0.5
  cross sections:
    n  RadiusFrac  shape
    0  0.16        NACA 4-series Camber=0 CamberLoc=0 Chord=13.2405 ThickChord=0.12
    1  0.45        NACA 4-series Camber=0.05 CamberLoc=0.4 Chord=12.1156 ThickChord=0.12
    2  0.7         NACA 4-series Camber=0.05 CamberLoc=0.4 Chord=10.7682 ThickChord=0.12
    3  1           NACA 4-series Camber=0.05 CamberLoc=0.4 Chord=8.8416 ThickChord=0.12
  blade curves as in "TopProp"

Fuselage "HalbachMotor", child of "TopProp"
  location (X Y Z) 384 217.527 154.354, rotation -167.5 -90 0; relative location -2.06522 0 0, rotation 0 0 0
  symmetric about XZ
  bounding box size 24 460.216 9.09973
  Design: Length=4
  cross sections:
    n  XLocPercent  YLocPercent  ZLocPercent  shape
    0  0            0            0            point
    1  0            0            0            circle Circle_Diameter=24
    2  0.5          0            0            as above
    3  1            0            0            as above
    4  1            0            0            point

Fuselage "Hub", child of "TopProp"
  location (X Y Z) 384 217.379 155.022, rotation -167.5 -90 0; relative location -2.75 0 0, rotation 0 0 0
  symmetric about XZ
  bounding box size 28 464.462 11.5749
  Design: Length=5.29545
  cross sections:
    n  XLocPercent  YLocPercent  ZLocPercent  shape
    0  0            0            0            point
    1  0.1          0            0            circle Circle_Diameter=28
    2  0.5          0            0            as above
    3  0.9          0            0            as above
    4  1            0            0            point

Propeller "BottomProp", child of "TopProp"
  location (X Y Z) 384 219.922 143.551, rotation -167.5 -90 0; relative location 9 0 0, rotation 0 0 0
  symmetric about XZ
  bounding box size 144.313 457.109 10.5599
  Design: Diameter=140 NumBlade=2 Beta34=20 UseBeta34Flag=1 Feather=0 Rotate=79.5 ReverseFlag=0 FoldAngle=0 AF=100.604 ConstructXoC=0.5
  cross sections:
    n  RadiusFrac  shape
    0  0.175       NACA 4-series Camber=0 CamberLoc=0 Chord=11.879 ThickChord=0.12
    1  0.45        NACA 4-series Camber=0.05 CamberLoc=0.4 Chord=10.8364 ThickChord=0.12
    2  0.7         NACA 4-series Camber=0.05 CamberLoc=0.4 Chord=9.53031 ThickChord=0.12
    3  1           NACA 4-series Camber=0.05 CamberLoc=0.4 Chord=7.7 ThickChord=0.12
  blade curves as in "BottomProp"

Fuselage "HalbachMotor", child of "BottomProp"
  location (X Y Z) 384 219.056 147.456, rotation -167.5 -90 0; relative location -4 0 0, rotation 0 0 0
  symmetric about XZ
  bounding box size 24 463.275 9.09973
  Design: Length=4
  cross sections:
    n  XLocPercent  YLocPercent  ZLocPercent  shape
    0  0            0            0            point
    1  0            0            0            circle Circle_Diameter=24
    2  0.5          0            0            as above
    3  1            0            0            as above
    4  1            0            0            point

Fuselage "Hub", child of "BottomProp"
  location (X Y Z) 384 218.503 149.95, rotation -167.5 -90 0; relative location -6.55435 0 0, rotation 0 0 0
  symmetric about XZ
  bounding box size 28 467.921 14.3914
  Design: Length=8
  cross sections:
    n  XLocPercent  YLocPercent  ZLocPercent  shape
    0  0            0            0            point
    1  0.1          0            0            circle Circle_Diameter=28
    2  0.5          0            0            as above
    3  0.9          0            0            as above
    4  1            0            0            point

Ellipsoid "CG"
  location (X Y Z) 292.97 0 132.81, rotation 0 0 0
  bounding box size 6 6 6
  Design: A_Radius=3 B_Radius=3 C_Radius=3

User parameters
  VTOL:DiskArea = 3.33333  (Disk Area)
  VTOL:DiskLoading = 50  (Disk Loading)
  VTOL:GrossWeight = 5000  (Gross Weight)
  VTOL:Naft = 20  (Number of disks in aft array)
  VTOL:Nfwd = 10  (Number of disks in forward array)
  VTOL:Spac = 0  (Spac)

Advanced link "genRefWing"
  input FrontWingArea = (not in this file)
  input AftWingArea = (not in this file)
  input AftWingSpan = (not in this file)
  output RefWingProjSpan = (not in this file)
  output RefWingArea = (not in this file)
    RefWingArea = FrontWingArea + AftWingArea;
    RefWingProjSpan = AftWingSpan;

Advanced link "genRefWing"
  input FrontWingArea = (not in this file)
  input AftWingArea = (not in this file)
  input AftWingSpan = (not in this file)
  output RefWingProjSpan = (not in this file)
  output RefWingArea = (not in this file)
    RefWingArea = FrontWingArea + AftWingArea;
    RefWingProjSpan = AftWingSpan;
