OpenVSP model (file version 5), 28 components.
Geometry view with OpenVSP parameter names; values to 6 digits, angles in degrees, lengths in the model's unit.
Overall bounding box: X_Min=-0.758704 X_Len=30.7587 Y_Min=-8.53109 Y_Len=23.5581 Z_Min=-13.4782 Z_Len=26.9564

Human "HumanGeom"
  location (X Y Z) 0 0 0, rotation 0 0 0
  mass: Density=65.8007 Shell_Flag=0 Mass_Area=1 Mass_Prior=0
  Anthropometric: Age=30 AutoDensity=1 BMI=27.7 BMI_pct=0.5 GenderFlag=0 LenUnit=2 Mass=75 MassUnit=1 SitFrac=0.51 Stature=5.76115 Stature_pct=0.5 Volume=2.86175

Human "HumanGeom"
  location (X Y Z) 0 0 0, rotation 0 0 0
  mass: Density=65.8007 Shell_Flag=0 Mass_Area=1 Mass_Prior=0
  Anthropometric: Age=30 AutoDensity=1 BMI=27.7 BMI_pct=0.5 GenderFlag=0 LenUnit=2 Mass=75 MassUnit=1 SitFrac=0.51 Stature=5.76115 Stature_pct=0.5 Volume=2.86175

Human "HumanGeom"
  location (X Y Z) 0 0 0, rotation 0 0 0
  mass: Density=65.8007 Shell_Flag=0 Mass_Area=1 Mass_Prior=0
  Anthropometric: Age=30 AutoDensity=1 BMI=27.7 BMI_pct=0.5 GenderFlag=0 LenUnit=2 Mass=75 MassUnit=1 SitFrac=0.51 Stature=5.76115 Stature_pct=0.5 Volume=2.86175

Human "HumanGeom"
  location (X Y Z) 0 0 0, rotation 0 0 0
  mass: Density=65.8007 Shell_Flag=0 Mass_Area=1 Mass_Prior=0
  Anthropometric: Age=30 AutoDensity=1 BMI=27.7 BMI_pct=0.5 GenderFlag=0 LenUnit=2 Mass=75 MassUnit=1 SitFrac=0.51 Stature=5.76115 Stature_pct=0.5 Volume=2.86175

Human "HumanGeom"
  location (X Y Z) 0 0 0, rotation 0 0 0
  mass: Density=65.8007 Shell_Flag=0 Mass_Area=1 Mass_Prior=0
  Anthropometric: Age=30 AutoDensity=1 BMI=27.7 BMI_pct=0.5 GenderFlag=0 LenUnit=2 Mass=75 MassUnit=1 SitFrac=0.51 Stature=5.76115 Stature_pct=0.5 Volume=2.86175

Human "HumanGeom"
  location (X Y Z) 0 0 0, rotation 0 0 0
  mass: Density=65.8007 Shell_Flag=0 Mass_Area=1 Mass_Prior=0
  Anthropometric: Age=30 AutoDensity=1 BMI=27.7 BMI_pct=0.5 GenderFlag=0 LenUnit=2 Mass=75 MassUnit=1 SitFrac=0.51 Stature=5.76115 Stature_pct=0.5 Volume=2.86175

Fuselage "FuselageGeom"
  location (X Y Z) 0 0 0, rotation 0 0 0
  bounding box size 30 2.70416 3
  Design: Length=9.144
  cross sections:
    n  XLocPercent  YLocPercent  ZLocPercent  shape
    0  0            0            0            point
    1  0.024145     0            -0.002082    general fuselage BotStr=0.827589 BotTanAngle=90 CornerRad=0 Height=0.649813 LowStr=0.81429 MaxWidthLoc=0.024812 TopStr=1.10925 TopTanAngle=90 UpStr=0.692274 Width=0.696833
    2  0.121627     0            0.025612     general fuselage BotStr=1.19151 BotTanAngle=90 CornerRad=0 Height=1.51825 LowStr=1.27 MaxWidthLoc=-0.117303 TopStr=0.342421 TopTanAngle=90 UpStr=1.7302 Width=1.50002
    3  0.211428     0            0.04395      general fuselage BotStr=1.1383 BotTanAngle=90 CornerRad=0 Height=1.86049 LowStr=1.42286 MaxWidthLoc=-0.190324 TopStr=0.651397 TopTanAngle=90 UpStr=1.74091 Width=1.75201
    4  0.418359     0            0.04395      general fuselage BotStr=1.27659 BotTanAngle=90 CornerRad=0 Height=1.86049 LowStr=1.42286 MaxWidthLoc=-0.190324 TopStr=1.00146 TopTanAngle=90 UpStr=2 Width=1.86753
    5  0.479564     0            0.053155     general fuselage BotStr=0.781013 BotTanAngle=90 CornerRad=0 Height=1.70703 LowStr=1.5 MaxWidthLoc=-0.125562 TopStr=1.25 TopTanAngle=90 UpStr=1.50472 Width=1.55169
    6  0.614653     0            0.098281     general fuselage BotStr=0.337871 BotTanAngle=90 CornerRad=0 Height=0.817433 LowStr=1.0683 MaxWidthLoc=-0.310309 TopStr=1.54262 TopTanAngle=90 UpStr=0.818164 Width=0.965442
    7  0.923427     0            0.116377     general fuselage BotStr=0.952476 BotTanAngle=90 CornerRad=0 Height=0.360553 LowStr=0.67819 MaxWidthLoc=-0.500607 TopStr=2 TopTanAngle=90 UpStr=1.27804 Width=0.265605
    8  1            0            0.118292     point

Wing "WingGeom", child of "FuselageGeom"
  location (X Y Z) 8.50644 0 1.5, rotation 0 0 0; relative location 0 0 0, rotation 0 0 0
  symmetric about XZ
  bounding box size 1.6598 15.3858 1.00792
  totals: TotalSpan=15.3952 TotalProjectedSpan=15.3858 TotalChord=1.03065 TotalArea=19.5355 TotalAR=12.1176 MAC=1.33283
  root: chord 1.6598, twist 0, airfoil file "NASA/LANGLEY LS(1)-0417 (GA(W)-1) AIRFOIL"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 BaseThickChord=0.16998 ThickChord=0.16998
  sections:
    n  Span      Root_Chord  Tip_Chord  Area      Sweep    Sweep_Location  Dihedral  Twist  Twist_Location  tip airfoil
    1  4.49243   1.6598      1.2596     6.55758   0        0.7             -2        -0.5   0.7             as above
    2  2.01906   1.2596      1.00768    2.28888   0        0.7             -2        -0.5   0.7             as above
    3  0.634665  1.00768     0.866258   0.59466   3.63636  0.7             -2        -0.5   0.7             as above
    4  0.551448  0.866258    0.31833    0.326619  8        0.7             -2        -0.5   0.7             as above

Fuselage "FuselageGeom", child of "WingGeom"
  location (X Y Z) 0 0 0, rotation 0 0 0; relative location -1.7 0 -0.2, rotation 0 0 0
  symmetric about XZ
  bounding box size 30 2.70416 3
  Design: Length=4.8768
  cross sections:
    n  XLocPercent  YLocPercent  ZLocPercent  shape
    0  0            0            0            point
    1  0.25         0            0            circle Circle_Diameter=0.3048
    2  0.5          0            0            as above
    3  0.75         0            0            as above
    4  1            0            0            point

Fuselage "FuselageGeom", child of "FuselageGeom"
  location (X Y Z) 0 0 0, rotation 0 0 0; relative location 0 0 0.1, rotation 180 90 0
  symmetric about XZ
  bounding box size 30 2.70416 3
  Design: Length=0.3048
  cross sections:
    n  XLocPercent  YLocPercent  ZLocPercent  shape
    0  0            0            0            point
    1  0.25         0            0            circle Circle_Diameter=0.6858
    2  0.5          0            0            as above
    3  0.75         0            0            as above
    4  1            0            0            point

Propeller "PropGeom", child of "FuselageGeom"
  location (X Y Z) 0 0 0, rotation 0 0 0; relative location 0.1524 0 0, rotation 0 180 0
  symmetric about XZ
  bounding box size 1.49091 23.5581 26.9564
  Design: Diameter=3.048 NumBlade=2 Beta34=0 UseBeta34Flag=1 Feather=0 Rotate=90 Precone=0 ReverseFlag=0 FoldAngle=0 PropMode=1 AF=151.538 CLi=0.538798 Chord=0.177656 Solidity=0.169649 ConstructXoC=0.25 FeatherAxisXoC=0.25 FeatherOffsetXoC=0
  cross sections:
    n  RadiusFrac  shape
    0  0.21        airfoil file "BOEING-VERTOL VR-12 AIRFOIL"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 BaseThickChord=0.106373 Chord=1.2 ThickChord=0.106373
    1  0.75        airfoil file "BOEING-VERTOL VR-12 AIRFOIL"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 BaseThickChord=0.106373 Chord=2.49375 ThickChord=0.106373
    2  1           airfoil file "BOEING-VERTOL VR-12 AIRFOIL"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 BaseThickChord=0.106373 Chord=1.95 ThickChord=0.106373
  Chord along r/R (linear): 0.21: 0.557, 0.259375: 0.548288, 0.358125: 0.530863, 0.456875: 0.513438, 0.555625: 0.496013, 0.654375: 0.478588, 0.753125: 0.461163, 0.851875: 0.443738, 0.950625: 0.426313, 1: 0.4176
  Twist along r/R (linear): 0.2: 8.1, 0.75: 0, 1: -3.75
  Thick along r/R (linear): 0.21: 0.10637, 0.259375: 0.10637, 0.358125: 0.10637, 0.456875: 0.10637, 0.555625: 0.10637, 0.654375: 0.10637, 0.753125: 0.10637, 0.851875: 0.10637, 0.950625: 0.10637, 1: 0.10637
  CLI along r/R (cubic Bezier): 0.2: 0, 0.266667: 0.7, 0.333333: 0.7, 0.4: 0.7, 0.466667: 0.7, 0.533333: 0.7, 0.6: 0.7, 0.733333: 0.7, 0.866667: 0.7, 1: 0.2

Fuselage "FuselageGeom", child of "FuselageGeom"
  location (X Y Z) 0 0 0, rotation 0 0 0; relative location 0 0 0.1, rotation 180 90 0
  symmetric about XZ
  bounding box size 30 2.70416 3
  Design: Length=0.3048
  cross sections:
    n  XLocPercent  YLocPercent  ZLocPercent  shape
    0  0            0            0            point
    1  0.25         0            0            circle Circle_Diameter=0.6858
    2  0.5          0            0            as above
    3  0.75         0            0            as above
    4  1            0            0            point

Propeller "PropGeom", child of "FuselageGeom"
  location (X Y Z) 0 0 0, rotation 0 0 0; relative location 0.1524 0 0, rotation 0 180 0
  symmetric about XZ
  bounding box size 1.49091 23.5581 26.9564
  Design: Diameter=3.048 NumBlade=2 Beta34=0 UseBeta34Flag=1 Feather=0 Rotate=90 Precone=0 ReverseFlag=0 FoldAngle=0 PropMode=1 AF=151.538 CLi=0.538798 Chord=0.177656 Solidity=0.169649 ConstructXoC=0.25 FeatherAxisXoC=0.25 FeatherOffsetXoC=0
  cross sections:
    n  RadiusFrac  shape
    0  0.21        airfoil file "BOEING-VERTOL VR-12 AIRFOIL"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 BaseThickChord=0.106373 Chord=1.2 ThickChord=0.106373
    1  0.75        airfoil file "BOEING-VERTOL VR-12 AIRFOIL"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 BaseThickChord=0.106373 Chord=2.49375 ThickChord=0.106373
    2  1           airfoil file "BOEING-VERTOL VR-12 AIRFOIL"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 BaseThickChord=0.106373 Chord=1.95 ThickChord=0.106373
  blade curves as in "PropGeom"

Fuselage "FuselageGeom", child of "WingGeom"
  location (X Y Z) 0 0 0, rotation 0 0 0; relative location -1.9 0 -0.2, rotation 0 0 0
  symmetric about XZ
  bounding box size 30 2.70416 3
  Design: Length=4.8768
  cross sections:
    n  XLocPercent  YLocPercent  ZLocPercent  shape
    0  0            0            0            point
    1  0.25         0            0            circle Circle_Diameter=0.3048
    2  0.5          0            0            as above
    3  0.75         0            0            as above
    4  1            0            0            point

Fuselage "FuselageGeom", child of "FuselageGeom"
  location (X Y Z) 0 0 0, rotation 0 0 0; relative location 0 0 0.1, rotation 180 90 0
  symmetric about XZ
  bounding box size 30 2.70416 3
  Design: Length=0.3048
  cross sections:
    n  XLocPercent  YLocPercent  ZLocPercent  shape
    0  0            0            0            point
    1  0.25         0            0            circle Circle_Diameter=0.6858
    2  0.5          0            0            as above
    3  0.75         0            0            as above
    4  1            0            0            point

Propeller "PropGeom", child of "FuselageGeom"
  location (X Y Z) 0 0 0, rotation 0 0 0; relative location 0.1524 0 0, rotation 0 180 0
  symmetric about XZ
  bounding box size 1.49091 23.5581 26.9564
  Design: Diameter=3.048 NumBlade=2 Beta34=0 UseBeta34Flag=1 Feather=0 Rotate=90 Precone=0 ReverseFlag=0 FoldAngle=0 PropMode=1 AF=151.538 CLi=0.538798 Chord=0.177656 Solidity=0.169649 ConstructXoC=0.25 FeatherAxisXoC=0.25 FeatherOffsetXoC=0
  cross sections:
    n  RadiusFrac  shape
    0  0.21        airfoil file "BOEING-VERTOL VR-12 AIRFOIL"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 BaseThickChord=0.106373 Chord=1.2 ThickChord=0.106373
    1  0.75        airfoil file "BOEING-VERTOL VR-12 AIRFOIL"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 BaseThickChord=0.106373 Chord=2.49375 ThickChord=0.106373
    2  1           airfoil file "BOEING-VERTOL VR-12 AIRFOIL"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 BaseThickChord=0.106373 Chord=1.95 ThickChord=0.106373
  blade curves as in "PropGeom"

Fuselage "FuselageGeom", child of "FuselageGeom"
  location (X Y Z) 0 0 0, rotation 0 0 0; relative location 0 0 0.1, rotation 180 90 0
  symmetric about XZ
  bounding box size 30 2.70416 3
  Design: Length=0.3048
  cross sections:
    n  XLocPercent  YLocPercent  ZLocPercent  shape
    0  0            0            0            point
    1  0.25         0            0            circle Circle_Diameter=0.6858
    2  0.5          0            0            as above
    3  0.75         0            0            as above
    4  1            0            0            point

Propeller "PropGeom", child of "FuselageGeom"
  location (X Y Z) 0 0 0, rotation 0 0 0; relative location 0.1524 0 0, rotation 0 180 0
  symmetric about XZ
  bounding box size 1.49091 23.5581 26.9564
  Design: Diameter=3.048 NumBlade=2 Beta34=0 UseBeta34Flag=1 Feather=0 Rotate=90 Precone=0 ReverseFlag=0 FoldAngle=0 PropMode=1 AF=151.538 CLi=0.538798 Chord=0.177656 Solidity=0.169649 ConstructXoC=0.25 FeatherAxisXoC=0.25 FeatherOffsetXoC=0
  cross sections:
    n  RadiusFrac  shape
    0  0.21        airfoil file "BOEING-VERTOL VR-12 AIRFOIL"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 BaseThickChord=0.106373 Chord=1.2 ThickChord=0.106373
    1  0.75        airfoil file "BOEING-VERTOL VR-12 AIRFOIL"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 BaseThickChord=0.106373 Chord=2.49375 ThickChord=0.106373
    2  1           airfoil file "BOEING-VERTOL VR-12 AIRFOIL"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 BaseThickChord=0.106373 Chord=1.95 ThickChord=0.106373
  blade curves as in "PropGeom"

Wing "WingGeom", child of "FuselageGeom"
  location (X Y Z) 19.9438 0 1.39, rotation 0 0 0; relative location 0 0 -0.11, rotation 0 0 0
  symmetric about XZ
  bounding box size 1.15443 3.97459 0.11551
  totals: TotalSpan=3.97459 TotalProjectedSpan=3.97459 TotalChord=0.923544 TotalArea=3.67071 TotalAR=4.30363 MAC=0.942785
  root: chord 1.15443, twist 0, NACA 4-series Camber=0 CamberLoc=0.1 ThickChord=0.15
  sections:
    n  Span    Root_Chord  Tip_Chord  Area     Sweep  Sweep_Location  Dihedral  Twist  Twist_Location  tip airfoil
    1  1.9873  1.15443     0.692658   1.83536  0      0.25            0         0      0.25            as above

Wing "WingGeom", child of "FuselageGeom"
  location (X Y Z) 15.7602 0 1.42883, rotation 90 0 0; relative location 0 0 -0.07117, rotation 90 0 0
  bounding box size 3.43179 0.296962 1.73126
  totals: TotalSpan=1.73126 TotalProjectedSpan=1.73126 TotalChord=1.69164 TotalArea=2.54027 TotalAR=1.1799 MAC=1.66511
  root: chord 2.9679, twist 0, NACA 4-series Camber=0 CamberLoc=0.1 ThickChord=0.12
  sections:
    n  Span      Root_Chord  Tip_Chord  Area      Sweep  Sweep_Location  Dihedral  Twist  Twist_Location  tip airfoil
    1  0.347976  2.9679      1.81302    0.831823  15     1               0         0      0.25            NACA 4-series Camber=0 CamberLoc=0.1 ThickChord=0.14
    2  0.130238  1.81302     1.60471    0.222559  15     1               0         0      0.25            NACA 4-series Camber=0 CamberLoc=0.1 ThickChord=0.15
    3  0.158541  1.60471     1.45828    0.242805  15     1               0         0      0.25            as above
    4  1.09451   1.45828     0.813214   1.24308   15     1               0         0      0.25            NACA 4-series Camber=0 CamberLoc=0.1 ThickChord=0.12

Wing "WingGeom", child of "FuselageGeom"
  location (X Y Z) 7.96875 0 -1.53, rotation -90 0 0; relative location 0 0 -0.03, rotation -90 0 0
  bounding box size 0.33045 0.021964 0.3048
  totals: TotalSpan=0.3048 TotalProjectedSpan=0.3048 TotalChord=0.219512 TotalArea=0.0669073 TotalAR=1.38853 MAC=0.219512
  root: chord 0.219512, twist 0, NACA 4-series Camber=0 CamberLoc=0.1 ThickChord=0.5
  sections:
    n  Span    Root_Chord  Tip_Chord  Area       Sweep  Sweep_Location  Dihedral  Twist  Twist_Location  tip airfoil
    1  0.3048  0.219512    0.219512   0.0669073  -20    0               0         0      0.25            as above

BodyOfRevolution "BORGeom", child of "WingGeom"
  location (X Y Z) 0 0 0, rotation 0 0 0; relative location 0 0.15 0.112, rotation 0 90 0
  bounding box size 1 3 3
  Design: A0=3.14159 Ae=3.14159 Amin=0.785398 AminW=0.25 Angle=0 Diameter=0.3 Mode=0
  profile: circle Circle_Diameter=0.225

Wing "WingGeom", child of "FuselageGeom"
  location (X Y Z) 9.375 -0.7388 -1.24104, rotation 75 0 -180; relative location 0 0 -0.03, rotation -105 180 0
  bounding box size 0.33045 0.100104 0.300099
  totals: TotalSpan=0.3048 TotalProjectedSpan=0.3048 TotalChord=0.219512 TotalArea=0.0669073 TotalAR=1.38853 MAC=0.219512
  root: chord 0.219512, twist 0, NACA 4-series Camber=0 CamberLoc=0.1 ThickChord=0.5
  sections:
    n  Span    Root_Chord  Tip_Chord  Area       Sweep  Sweep_Location  Dihedral  Twist  Twist_Location  tip airfoil
    1  0.3048  0.219512    0.219512   0.0669073  -20    0               0         0      0.25            as above

BodyOfRevolution "BORGeom", child of "WingGeom"
  location (X Y Z) 0 0 0, rotation 0 0 0; relative location 0 0.18 0.08, rotation -15 90 0
  bounding box size 1 3 3
  Design: A0=3.14159 Ae=3.14159 Amin=0.785398 AminW=0.25 Angle=0 Diameter=0.3 Mode=0
  profile: circle Circle_Diameter=0.225

Wing "WingGeom", child of "FuselageGeom"
  location (X Y Z) 9.375 0.7388 -1.24104, rotation 105 0 -180; relative location 0 0 -0.03, rotation -75 180 0
  bounding box size 0.33045 0.100104 0.300099
  totals: TotalSpan=0.3048 TotalProjectedSpan=0.3048 TotalChord=0.219512 TotalArea=0.0669073 TotalAR=1.38853 MAC=0.219512
  root: chord 0.219512, twist 0, NACA 4-series Camber=0 CamberLoc=0.1 ThickChord=0.5
  sections:
    n  Span    Root_Chord  Tip_Chord  Area       Sweep  Sweep_Location  Dihedral  Twist  Twist_Location  tip airfoil
    1  0.3048  0.219512    0.219512   0.0669073  -20    0               0         0      0.25            as above

BodyOfRevolution "BORGeom", child of "WingGeom"
  location (X Y Z) 0 0 0, rotation 0 0 0; relative location 0 0.18 -0.08, rotation -165 90 0
  bounding box size 1 3 3
  Design: A0=3.14159 Ae=3.14159 Amin=0.785398 AminW=0.25 Angle=0 Diameter=0.3 Mode=0
  profile: circle Circle_Diameter=0.225

Fuselage "FuselageGeom", child of "FuselageGeom"
  location (X Y Z) 0 0 0, rotation 0 0 0
  bounding box size 30 2.70416 3
  Design: Length=0.3048
  cross sections:
    n  XLocPercent  YLocPercent  ZLocPercent  shape
    0  0            0            0            point
    1  0.25         0            0            circle Circle_Diameter=0.4572
    2  0.5          0            0            as above
    3  0.75         0            0            as above
    4  1            0            0            point

Propeller "PropGeom", child of "FuselageGeom"
  location (X Y Z) 0 0 0, rotation 0 0 0; relative location 0.1524 0 0, rotation 0 180 0
  bounding box size 1.49091 23.5581 26.9564
  Design: Diameter=2.7432 NumBlade=6 Beta34=0 UseBeta34Flag=1 Feather=0 Rotate=0 Precone=0 ReverseFlag=0 FoldAngle=0 PropMode=1 AF=151.538 CLi=0.538798 Chord=0.177656 Solidity=0.169649 ConstructXoC=0.25 FeatherAxisXoC=0.25 FeatherOffsetXoC=0
  cross sections:
    n  RadiusFrac  shape
    0  0.21        airfoil file "BOEING-VERTOL VR-12 AIRFOIL"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 BaseThickChord=0.106373 Chord=1.2 ThickChord=0.106373
    1  0.75        airfoil file "BOEING-VERTOL VR-12 AIRFOIL"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 BaseThickChord=0.106373 Chord=2.49375 ThickChord=0.106373
    2  1           airfoil file "BOEING-VERTOL VR-12 AIRFOIL"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 BaseThickChord=0.106373 Chord=1.95 ThickChord=0.106373
  Chord along r/R (linear): 0.21: 0.5086, 0.259375: 0.500656, 0.358125: 0.484769, 0.456875: 0.468881, 0.555625: 0.452994, 0.654375: 0.437106, 0.753125: 0.421219, 0.851875: 0.405331, 0.950625: 0.389444, 1: 0.3815
  Twist along r/R (linear): 0.2: 19.32, 0.75: 0, 1: -8.33
  Thick along r/R (linear): 0.21: 0.10637, 0.259375: 0.10637, 0.358125: 0.10637, 0.456875: 0.10637, 0.555625: 0.10637, 0.654375: 0.10637, 0.753125: 0.10637, 0.851875: 0.10637, 0.950625: 0.10637, 1: 0.10637
  CLI along r/R (cubic Bezier): 0.2: 0, 0.266667: 0.7, 0.333333: 0.7, 0.4: 0.7, 0.466667: 0.7, 0.533333: 0.7, 0.6: 0.7, 0.733333: 0.7, 0.866667: 0.7, 1: 0.2
