OpenVSP model (file version 5), 25 components.
Geometry view with OpenVSP parameter names; values to 6 digits, angles in degrees, lengths in the model's unit.
Overall bounding box: X_Min=-0.758704 X_Len=30.7587 Y_Min=-8.53109 Y_Len=23.5581 Z_Min=-13.4782 Z_Len=26.9564

Human "HumanGeom"
  location (X Y Z) 0 0 0, rotation 0 0 0
  mass: Density=65.8007 Shell_Flag=0 Mass_Area=1 Mass_Prior=0
  Anthropometric: Age=30 AutoDensity=1 BMI=27.7 BMI_pct=0.5 GenderFlag=0 LenUnit=2 Mass=75 MassUnit=1 SitFrac=0.51 Stature=5.76115 Stature_pct=0.5 Volume=2.86175

Human "HumanGeom"
  location (X Y Z) 0 0 0, rotation 0 0 0
  mass: Density=65.8007 Shell_Flag=0 Mass_Area=1 Mass_Prior=0
  Anthropometric: Age=30 AutoDensity=1 BMI=27.7 BMI_pct=0.5 GenderFlag=0 LenUnit=2 Mass=75 MassUnit=1 SitFrac=0.51 Stature=5.76115 Stature_pct=0.5 Volume=2.86175

Human "HumanGeom"
  location (X Y Z) 0 0 0, rotation 0 0 0
  mass: Density=65.8007 Shell_Flag=0 Mass_Area=1 Mass_Prior=0
  Anthropometric: Age=30 AutoDensity=1 BMI=27.7 BMI_pct=0.5 GenderFlag=0 LenUnit=2 Mass=75 MassUnit=1 SitFrac=0.51 Stature=5.76115 Stature_pct=0.5 Volume=2.86175

Human "HumanGeom"
  location (X Y Z) 0 0 0, rotation 0 0 0
  mass: Density=65.8007 Shell_Flag=0 Mass_Area=1 Mass_Prior=0
  Anthropometric: Age=30 AutoDensity=1 BMI=27.7 BMI_pct=0.5 GenderFlag=0 LenUnit=2 Mass=75 MassUnit=1 SitFrac=0.51 Stature=5.76115 Stature_pct=0.5 Volume=2.86175

Human "HumanGeom"
  location (X Y Z) 0 0 0, rotation 0 0 0
  mass: Density=65.8007 Shell_Flag=0 Mass_Area=1 Mass_Prior=0
  Anthropometric: Age=30 AutoDensity=1 BMI=27.7 BMI_pct=0.5 GenderFlag=0 LenUnit=2 Mass=75 MassUnit=1 SitFrac=0.51 Stature=5.76115 Stature_pct=0.5 Volume=2.86175

Human "HumanGeom"
  location (X Y Z) 0 0 0, rotation 0 0 0
  mass: Density=65.8007 Shell_Flag=0 Mass_Area=1 Mass_Prior=0
  Anthropometric: Age=30 AutoDensity=1 BMI=27.7 BMI_pct=0.5 GenderFlag=0 LenUnit=2 Mass=75 MassUnit=1 SitFrac=0.51 Stature=5.76115 Stature_pct=0.5 Volume=2.86175

Fuselage "FuselageGeom"
  location (X Y Z) 0 0 0, rotation 0 0 0
  bounding box size 30 2.70416 3
  Design: Length=6.4008
  cross sections:
    n  XLocPercent  YLocPercent  ZLocPercent  shape
    0  0            0            -0.081739    point
    1  0.30145      0            -0.053347    general fuselage BotStr=1.39745 BotTanAngle=90 CornerRad=0 Height=1.8288 LowStr=1.32259 MaxWidthLoc=0 TopStr=0.785604 TopTanAngle=90 UpStr=1.34754 Width=1.90777
    2  0.490545     0            -0.041389    general fuselage BotStr=1.39745 BotTanAngle=90 CornerRad=0 Height=2.05603 LowStr=1.32259 MaxWidthLoc=0.172727 TopStr=1.46651 TopTanAngle=90 UpStr=0.955949 Width=1.95978
    3  0.669739     0            -0.037689    general fuselage BotStr=1.39745 BotTanAngle=90 CornerRad=0 Height=2.02334 LowStr=1.32259 MaxWidthLoc=0.4 TopStr=1.43141 TopTanAngle=90 UpStr=0.738126 Width=1.90777
    4  0.818715     0            -0.005047    general fuselage BotStr=1.12295 BotTanAngle=90 CornerRad=0 Height=1.54399 LowStr=0.911463 MaxWidthLoc=0.672727 TopStr=1.64396 TopTanAngle=90 UpStr=0.164678 Width=1.33301
    5  1            0            0.090324     point

Wing "WingGeom", child of "FuselageGeom"
  location (X Y Z) 11.25 0 1.5, rotation 0 0 0; relative location 0 0 0, rotation 0 0 0
  bounding box size 7.77029 5.65743 0.924011
  totals: TotalSpan=5.71303 TotalProjectedSpan=5.65743 TotalChord=1.28589 TotalArea=7.43332 TotalAR=4.30581 MAC=1.45317
  root: chord 2.05742, twist 0, NACA 4-series Camber=0 CamberLoc=0.1 ThickChord=0.2
  sections:
    n  Span     Root_Chord  Tip_Chord  Area     Sweep  Sweep_Location  Dihedral  Twist  Twist_Location  tip airfoil
    1  2.96927  2.05742     1.28589    4.9636   -45    0               8         3      0.25            as above
    2  2.74376  1.28589     0.514356   2.46972  -45    0               8         3      0.25            NACA 4-series Camber=0 CamberLoc=0.1 ThickChord=0.36

Fuselage "FuselageGeom", child of "WingGeom"
  location (X Y Z) 0 0 0, rotation 0 0 0
  bounding box size 30 2.70416 3
  Design: Length=0.504749
  cross sections:
    n  XLocPercent  YLocPercent  ZLocPercent  shape
    0  0            0            0            point
    1  0.343827     0            0            ellipse Ellipse_Height=0.63149 Ellipse_Width=0.462395
    2  0.5          0            0            ellipse Ellipse_Height=0.67056 Ellipse_Width=0.51816
    3  0.759227     0            0.01087      ellipse Ellipse_Height=0.569422 Ellipse_Width=0.482595
    4  1            0            0            point

Propeller "PropGeom", child of "FuselageGeom"
  location (X Y Z) 0 0 0, rotation 0 0 0; relative location 0.252374 0 0, rotation 0 90 0
  bounding box size 1.49091 23.5581 26.9564
  Design: Diameter=8.41248 NumBlade=3 Beta34=0 UseBeta34Flag=1 Feather=0 Rotate=0 Precone=0 ReverseFlag=0 FoldAngle=0 PropMode=1 AF=151.538 CLi=0.538798 Chord=0.177656 Solidity=0.169649 ConstructXoC=0.25 FeatherAxisXoC=0.25 FeatherOffsetXoC=0
  cross sections:
    n  RadiusFrac  shape
    0  0.12        airfoil file "BOEING-VERTOL VR-12 AIRFOIL"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 BaseThickChord=0.106373 Chord=1.2 ThickChord=0.106373
    1  0.75        airfoil file "BOEING-VERTOL VR-12 AIRFOIL"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 BaseThickChord=0.106373 Chord=2.49375 ThickChord=0.106373
    2  1           airfoil file "BOEING-VERTOL VR-12 AIRFOIL"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 BaseThickChord=0.106373 Chord=1.95 ThickChord=0.106373
  Chord along r/R (linear): 0.2: 0.0725, 0.175: 0.071475, 0.285: 0.069425, 0.395: 0.067375, 0.505: 0.065325, 0.615: 0.063275, 0.725: 0.061225, 0.835: 0.059175, 0.945: 0.057125, 1: 0.0561
  Twist along r/R (linear): 0.2: 7.56, 0.75: 0, 1: -3
  Thick along r/R (linear): 0.2: 0.10637, 0.175: 0.10637, 0.285: 0.10637, 0.395: 0.10637, 0.505: 0.10637, 0.615: 0.10637, 0.725: 0.10637, 0.835: 0.10637, 0.945: 0.10637, 1: 0.10637
  CLI along r/R (cubic Bezier): 0.2: 0, 0.266667: 0.7, 0.333333: 0.7, 0.4: 0.7, 0.466667: 0.7, 0.533333: 0.7, 0.6: 0.7, 0.733333: 0.7, 0.866667: 0.7, 1: 0.2

Wing "WingGeom", child of "FuselageGeom"
  location (X Y Z) 11.25 0 1.5, rotation 180 0 0; relative location 0 0 0, rotation 180 0 0
  bounding box size 7.77029 5.65743 0.927372
  totals: TotalSpan=5.71303 TotalProjectedSpan=5.65743 TotalChord=1.28589 TotalArea=7.43332 TotalAR=4.30581 MAC=1.45317
  root: chord 2.05742, twist 0, NACA 4-series Camber=0 CamberLoc=0.1 Invert=1 ThickChord=0.2
  sections:
    n  Span     Root_Chord  Tip_Chord  Area     Sweep  Sweep_Location  Dihedral  Twist  Twist_Location  tip airfoil
    1  2.96927  2.05742     1.28589    4.9636   -45    0               -8        3      0.25            as above
    2  2.74376  1.28589     0.514356   2.46972  -45    0               -8        3      0.25            NACA 4-series Camber=0 CamberLoc=0.1 Invert=1 ThickChord=0.36

Fuselage "FuselageGeom", child of "WingGeom"
  location (X Y Z) 0 0 0, rotation 0 0 0
  bounding box size 30 2.70416 3
  Design: Length=0.504749
  cross sections:
    n  XLocPercent  YLocPercent  ZLocPercent  shape
    0  0            0            0            point
    1  0.343827     0            0            ellipse Ellipse_Height=0.63149 Ellipse_Width=0.462395
    2  0.5          0            0            ellipse Ellipse_Height=0.67056 Ellipse_Width=0.51816
    3  0.759227     0            0.01087      ellipse Ellipse_Height=0.569422 Ellipse_Width=0.482595
    4  1            0            0            point

Propeller "PropGeom", child of "FuselageGeom"
  location (X Y Z) 0 0 0, rotation 0 0 0; relative location 0.252374 0 0, rotation 0 -90 0
  bounding box size 1.49091 23.5581 26.9564
  Design: Diameter=8.41248 NumBlade=3 Beta34=0 UseBeta34Flag=1 Feather=0 Rotate=0 Precone=0 ReverseFlag=0 FoldAngle=0 PropMode=1 AF=151.538 CLi=0.538798 Chord=0.177656 Solidity=0.169649 ConstructXoC=0.25 FeatherAxisXoC=0.25 FeatherOffsetXoC=0
  cross sections:
    n  RadiusFrac  shape
    0  0.12        airfoil file "BOEING-VERTOL VR-12 AIRFOIL"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 BaseThickChord=0.106373 Chord=1.2 ThickChord=0.106373
    1  0.75        airfoil file "BOEING-VERTOL VR-12 AIRFOIL"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 BaseThickChord=0.106373 Chord=2.49375 ThickChord=0.106373
    2  1           airfoil file "BOEING-VERTOL VR-12 AIRFOIL"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 BaseThickChord=0.106373 Chord=1.95 ThickChord=0.106373
  blade curves as in "PropGeom"

Wing "WingGeom", child of "FuselageGeom"
  location (X Y Z) 11.25 0 1.5, rotation 0 0 0; relative location 0 0 0, rotation 0 0 0
  bounding box size 5.80987 5.48223 1.956
  totals: TotalSpan=5.79287 TotalProjectedSpan=5.48223 TotalChord=1.33245 TotalArea=6.54456 TotalAR=4.59233 MAC=1.26984
  root: chord 1.95945, twist 0, NACA 4-series Camber=0.027 CamberLoc=0.24545 ThickChord=0.27273
  sections:
    n  Span      Root_Chord  Tip_Chord  Area     Sweep    Sweep_Location  Dihedral  Twist  Twist_Location  tip airfoil
    1  1.14359   1.95945     1.50021    1.97822  46.6859  0               11.5      0      0.25            NACA 4-series Camber=0 CamberLoc=0.2 ThickChord=0.27273
    2  0.929377  1.50021     1.2725     1.28844  46.6859  0               17        -1     0.25            NACA 4-series Camber=0 CamberLoc=0.2 ThickChord=0.2
    3  3.7199    1.2725      0.489863   3.2779   40       0               21        -1     0.25            NACA 4-series Camber=0 CamberLoc=0.2 ThickChord=0.32

Fuselage "FuselageGeom", child of "WingGeom"
  location (X Y Z) 0 0 0, rotation 0 0 0
  bounding box size 30 2.70416 3
  Design: Length=0.504749
  cross sections:
    n  XLocPercent  YLocPercent  ZLocPercent  shape
    0  0            0            0            point
    1  0.343827     0            0            ellipse Ellipse_Height=0.63149 Ellipse_Width=0.462395
    2  0.5          0            0            ellipse Ellipse_Height=0.67056 Ellipse_Width=0.51816
    3  0.759227     0            0.01087      ellipse Ellipse_Height=0.569422 Ellipse_Width=0.482595
    4  1            0            0            point

Propeller "PropGeom", child of "FuselageGeom"
  location (X Y Z) 0 0 0, rotation 0 0 0; relative location 0.252374 0 0, rotation 0 90 0
  bounding box size 1.49091 23.5581 26.9564
  Design: Diameter=8.41248 NumBlade=3 Beta34=0 UseBeta34Flag=1 Feather=0 Rotate=0 Precone=0 ReverseFlag=0 FoldAngle=0 PropMode=1 AF=151.538 CLi=0.538798 Chord=0.177656 Solidity=0.169649 ConstructXoC=0.25 FeatherAxisXoC=0.25 FeatherOffsetXoC=0
  cross sections:
    n  RadiusFrac  shape
    0  0.12        airfoil file "BOEING-VERTOL VR-12 AIRFOIL"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 BaseThickChord=0.106373 Chord=1.2 ThickChord=0.106373
    1  0.75        airfoil file "BOEING-VERTOL VR-12 AIRFOIL"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 BaseThickChord=0.106373 Chord=2.49375 ThickChord=0.106373
    2  1           airfoil file "BOEING-VERTOL VR-12 AIRFOIL"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 BaseThickChord=0.106373 Chord=1.95 ThickChord=0.106373
  blade curves as in "PropGeom"

Wing "WingGeom", child of "FuselageGeom"
  location (X Y Z) 11.25 0 1.5, rotation 180 0 0; relative location 0 0 0, rotation 180 0 0
  bounding box size 5.80987 5.48223 1.9551
  totals: TotalSpan=5.79287 TotalProjectedSpan=5.48223 TotalChord=1.33245 TotalArea=6.54456 TotalAR=4.59233 MAC=1.26984
  root: chord 1.95945, twist 0, NACA 4-series Camber=0.027 CamberLoc=0.24545 Invert=1 ThickChord=0.27273
  sections:
    n  Span      Root_Chord  Tip_Chord  Area     Sweep    Sweep_Location  Dihedral  Twist  Twist_Location  tip airfoil
    1  1.14359   1.95945     1.50021    1.97822  46.6859  0               -11.5     0      0.25            NACA 4-series Camber=0 CamberLoc=0.2 Invert=1 ThickChord=0.27273
    2  0.929377  1.50021     1.2725     1.28844  46.6859  0               -17       -1     0.25            NACA 4-series Camber=0 CamberLoc=0.2 Invert=1 ThickChord=0.2
    3  3.7199    1.2725      0.489863   3.2779   40       0               -21       -1     0.25            NACA 4-series Camber=0 CamberLoc=0.2 Invert=1 ThickChord=0.32

Fuselage "FuselageGeom", child of "WingGeom"
  location (X Y Z) 0 0 0, rotation 0 0 0
  bounding box size 30 2.70416 3
  Design: Length=0.504749
  cross sections:
    n  XLocPercent  YLocPercent  ZLocPercent  shape
    0  0            0            0            point
    1  0.343827     0            0            ellipse Ellipse_Height=0.63149 Ellipse_Width=0.462395
    2  0.5          0            0            ellipse Ellipse_Height=0.67056 Ellipse_Width=0.51816
    3  0.759227     0            0.01087      ellipse Ellipse_Height=0.569422 Ellipse_Width=0.482595
    4  1            0            0            point

Propeller "PropGeom", child of "FuselageGeom"
  location (X Y Z) 0 0 0, rotation 0 0 0; relative location 0.252374 0 0, rotation 0 -90 0
  bounding box size 1.49091 23.5581 26.9564
  Design: Diameter=8.41248 NumBlade=3 Beta34=0 UseBeta34Flag=1 Feather=0 Rotate=0 Precone=0 ReverseFlag=0 FoldAngle=0 PropMode=1 AF=151.538 CLi=0.538798 Chord=0.177656 Solidity=0.169649 ConstructXoC=0.25 FeatherAxisXoC=0.25 FeatherOffsetXoC=0
  cross sections:
    n  RadiusFrac  shape
    0  0.12        airfoil file "BOEING-VERTOL VR-12 AIRFOIL"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 BaseThickChord=0.106373 Chord=1.2 ThickChord=0.106373
    1  0.75        airfoil file "BOEING-VERTOL VR-12 AIRFOIL"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 BaseThickChord=0.106373 Chord=2.49375 ThickChord=0.106373
    2  1           airfoil file "BOEING-VERTOL VR-12 AIRFOIL"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 BaseThickChord=0.106373 Chord=1.95 ThickChord=0.106373
  blade curves as in "PropGeom"

Wing "WingGeom", child of "FuselageGeom"
  location (X Y Z) 6.71554 0.737262 -1.19833, rotation 0 7 0; relative location 0 0 0, rotation 0 7 0
  bounding box size 0.463381 0.363964 0.725966
  totals: TotalSpan=0.750223 TotalProjectedSpan=0.363964 TotalChord=0.28956 TotalArea=0.217234 TotalAR=0.609801 MAC=0.289827
  root: chord 0.3048, twist 0, NACA 4-series Camber=0 CamberLoc=0.2 ThickChord=0.1
  sections:
    n  Span      Root_Chord  Tip_Chord  Area      Sweep  Sweep_Location  Dihedral  Twist  Twist_Location  tip airfoil
    1  0.750223  0.3048      0.27432    0.217234  20     0               -60.9783  0      0.25            as above

Fuselage "FuselageGeom", child of "WingGeom"
  location (X Y Z) 0 0 0, rotation 0 0 0; relative location 0 0 0, rotation 0 -6 0
  bounding box size 30 2.70416 3
  Design: Length=2.85404
  cross sections:
    n  XLocPercent  YLocPercent  ZLocPercent  shape
    0  0            0            0            point
    1  0            0            0            circle Circle_Diameter=0.0762
    2  0.5          0            0            as above
    3  1            0            0            as above
    4  1            0            0            point

Wing "WingGeom", child of "FuselageGeom"
  location (X Y Z) 6.71554 -0.737262 -1.19833, rotation 0 7 0; relative location 0 0 0, rotation 0 7 0
  bounding box size 0.463381 0.363964 0.725966
  totals: TotalSpan=0.750223 TotalProjectedSpan=1e-06 TotalChord=0.28956 TotalArea=0.217234 TotalAR=0 MAC=0.289827
  root: chord 0.3048, twist 0, NACA 4-series Camber=0 CamberLoc=0.2 ThickChord=0.1
  sections:
    n  Span      Root_Chord  Tip_Chord  Area      Sweep  Sweep_Location  Dihedral  Twist  Twist_Location  tip airfoil
    1  0.750223  0.3048      0.27432    0.217234  20     0               -119.022  0      0.25            as above

Fuselage "FuselageGeom", child of "WingGeom"
  location (X Y Z) 0 0 0, rotation 0 0 0; relative location 0 0 0, rotation 0 -6 0
  bounding box size 30 2.70416 3
  Design: Length=2.85404
  cross sections:
    n  XLocPercent  YLocPercent  ZLocPercent  shape
    0  0            0            0            point
    1  0            0            0            circle Circle_Diameter=0.0762
    2  0.5          0            0            as above
    3  1            0            0            as above
    4  1            0            0            point

Wing "WingGeom", child of "FuselageGeom"
  location (X Y Z) 15 0.621781 -1.30129, rotation 0 7 0; relative location 0 0 0, rotation 0 7 0
  bounding box size 0.407783 0.41237 0.807043
  totals: TotalSpan=0.849999 TotalProjectedSpan=0.41237 TotalChord=0.28956 TotalArea=0.246126 TotalAR=0.690902 MAC=0.289827
  root: chord 0.3048, twist 0, NACA 4-series Camber=0 CamberLoc=0.2 ThickChord=0.1
  sections:
    n  Span      Root_Chord  Tip_Chord  Area      Sweep  Sweep_Location  Dihedral  Twist  Twist_Location  tip airfoil
    1  0.849999  0.3048      0.27432    0.246126  15     0               -60.9783  0      0.25            as above

Wing "WingGeom", child of "FuselageGeom"
  location (X Y Z) 15 -0.621781 -1.30129, rotation 0 7 0; relative location 0 0 0, rotation 0 7 0
  bounding box size 0.407783 0.41237 0.807043
  totals: TotalSpan=0.849999 TotalProjectedSpan=1e-06 TotalChord=0.28956 TotalArea=0.246126 TotalAR=0 MAC=0.289827
  root: chord 0.3048, twist 0, NACA 4-series Camber=0 CamberLoc=0.2 ThickChord=0.1
  sections:
    n  Span      Root_Chord  Tip_Chord  Area      Sweep  Sweep_Location  Dihedral  Twist  Twist_Location  tip airfoil
    1  0.849999  0.3048      0.27432    0.246126  15     0               -119.022  0      0.25            as above
