OpenVSP model (file version 5), 11 components.
Geometry view with OpenVSP parameter names; values to 6 digits, angles in degrees, lengths in the model's unit.
Overall bounding box: X_Min=0 X_Len=30 Y_Min=-5.37046 Y_Len=10.7409 Z_Min=-2.10021 Z_Len=5.36394

Fuselage "FuselageGeom"
  location (X Y Z) 0 0 0, rotation 0 0 0
  bounding box size 30 2.70416 3
  Design: Length=6.4008
  cross sections:
    n  XLocPercent  YLocPercent  ZLocPercent  shape
    0  0            0            -0.081739    point
    1  0.30145      0            -0.053347    general fuselage BotStr=1.39745 BotTanAngle=90 CornerRad=0 Height=1.8288 LowStr=1.32259 MaxWidthLoc=0 TopStr=0.785604 TopTanAngle=90 UpStr=1.34754 Width=1.90777
    2  0.490545     0            -0.041389    general fuselage BotStr=1.39745 BotTanAngle=90 CornerRad=0 Height=2.05603 LowStr=1.32259 MaxWidthLoc=0.172727 TopStr=1.46651 TopTanAngle=90 UpStr=0.955949 Width=1.95978
    3  0.669739     0            -0.037689    general fuselage BotStr=1.39745 BotTanAngle=90 CornerRad=0 Height=2.02334 LowStr=1.32259 MaxWidthLoc=0.4 TopStr=1.43141 TopTanAngle=90 UpStr=0.738126 Width=1.90777
    4  0.818715     0            -0.005047    general fuselage BotStr=1.12295 BotTanAngle=90 CornerRad=0 Height=1.54399 LowStr=0.911463 MaxWidthLoc=0.672727 TopStr=1.64396 TopTanAngle=90 UpStr=0.164678 Width=1.33301
    5  1            0            0.090324     point

Wing "WingGeom", child of "FuselageGeom"
  location (X Y Z) 11.25 0 1.5, rotation 0 0 0; relative location 0 0 0, rotation 0 0 0
  bounding box size 7.37615 5.37046 0.877141
  totals: TotalSpan=5.42324 TotalProjectedSpan=5.37046 TotalChord=1.22066 TotalArea=6.69834 TotalAR=4.30581
  root: chord 1.95306, twist 0, NACA 4-series Camber=0 CamberLoc=0.1 ThickChord=0.2
  sections:
    n  Span     Root_Chord  Tip_Chord  Area     Sweep  Sweep_Location  Dihedral  Twist  Twist_Location  tip airfoil
    1  2.81865  1.95306     1.22066    4.47282  -45    0               8         3      0.25            as above
    2  2.60458  1.22066     0.488266   2.22553  -45    0               8         3      0.25            NACA 4-series Camber=0 CamberLoc=0.1 ThickChord=0.36

Wing "WingGeom", child of "FuselageGeom"
  location (X Y Z) 11.25 0 1.5, rotation 180 0 0; relative location 0 0 0, rotation 180 0 0
  bounding box size 7.37615 5.37046 0.880332
  totals: TotalSpan=5.42324 TotalProjectedSpan=5.37046 TotalChord=1.22066 TotalArea=6.69834 TotalAR=4.30581
  root: chord 1.95306, twist 0, NACA 4-series Camber=0 CamberLoc=0.1 Invert=1 ThickChord=0.2
  sections:
    n  Span     Root_Chord  Tip_Chord  Area     Sweep  Sweep_Location  Dihedral  Twist  Twist_Location  tip airfoil
    1  2.81865  1.95306     1.22066    4.47282  -45    0               -8        3      0.25            as above
    2  2.60458  1.22066     0.488266   2.22553  -45    0               -8        3      0.25            NACA 4-series Camber=0 CamberLoc=0.1 Invert=1 ThickChord=0.36

Wing "WingGeom", child of "FuselageGeom"
  location (X Y Z) 11.25 0 1.5, rotation 0 0 0; relative location 0 0 0, rotation 0 0 0
  bounding box size 5.51517 5.20414 1.85679
  totals: TotalSpan=5.49903 TotalProjectedSpan=5.20414 TotalChord=1.26486 TotalArea=5.89746 TotalAR=4.59233
  root: chord 1.86006, twist 0, NACA 4-series Camber=0.027 CamberLoc=0.24545 ThickChord=0.27273
  sections:
    n  Span      Root_Chord  Tip_Chord  Area     Sweep    Sweep_Location  Dihedral  Twist  Twist_Location  tip airfoil
    1  1.08558   1.86006     1.42411    1.78262  46.6859  0               11.5      0      0.25            NACA 4-series Camber=0 CamberLoc=0.2 ThickChord=0.27273
    2  0.882235  1.42411     1.20795    1.16105  46.6859  0               17        -1     0.25            NACA 4-series Camber=0 CamberLoc=0.2 ThickChord=0.2
    3  3.53121   1.20795     0.465015   2.95379  40       0               21        -1     0.25            NACA 4-series Camber=0 CamberLoc=0.2 ThickChord=0.32

Wing "WingGeom", child of "FuselageGeom"
  location (X Y Z) 11.25 0 1.5, rotation 180 0 0; relative location 0 0 0, rotation 180 0 0
  bounding box size 5.51517 5.20414 1.85593
  totals: TotalSpan=5.49903 TotalProjectedSpan=5.20414 TotalChord=1.26486 TotalArea=5.89746 TotalAR=4.59233
  root: chord 1.86006, twist 0, NACA 4-series Camber=0.027 CamberLoc=0.24545 Invert=1 ThickChord=0.27273
  sections:
    n  Span      Root_Chord  Tip_Chord  Area     Sweep    Sweep_Location  Dihedral  Twist  Twist_Location  tip airfoil
    1  1.08558   1.86006     1.42411    1.78262  46.6859  0               -11.5     0      0.25            NACA 4-series Camber=0 CamberLoc=0.2 Invert=1 ThickChord=0.27273
    2  0.882235  1.42411     1.20795    1.16105  46.6859  0               -17       -1     0.25            NACA 4-series Camber=0 CamberLoc=0.2 Invert=1 ThickChord=0.2
    3  3.53121   1.20795     0.465015   2.95379  40       0               -21       -1     0.25            NACA 4-series Camber=0 CamberLoc=0.2 Invert=1 ThickChord=0.32

Wing "WingGeom", child of "FuselageGeom"
  location (X Y Z) 6.71554 0.737262 -1.19833, rotation 0 7 0; relative location 0 0 0, rotation 0 7 0
  bounding box size 0.463381 0.363964 0.725966
  totals: TotalSpan=0.750223 TotalProjectedSpan=0.363964 TotalChord=0.28956 TotalArea=0.217234 TotalAR=0.609801
  root: chord 0.3048, twist 0, NACA 4-series Camber=0 CamberLoc=0.2 ThickChord=0.1
  sections:
    n  Span      Root_Chord  Tip_Chord  Area      Sweep  Sweep_Location  Dihedral  Twist  Twist_Location  tip airfoil
    1  0.750223  0.3048      0.27432    0.217234  20     0               -60.9783  0      0.25            as above

Fuselage "FuselageGeom", child of "WingGeom"
  location (X Y Z) 0 0 0, rotation 0 0 0; relative location 0 0 0, rotation 0 -6 0
  bounding box size 30 2.70416 3
  Design: Length=2.85404
  cross sections:
    n  XLocPercent  YLocPercent  ZLocPercent  shape
    0  0            0            0            point
    1  0            0            0            circle Circle_Diameter=0.0762
    2  0.5          0            0            as above
    3  1            0            0            as above
    4  1            0            0            point

Wing "WingGeom", child of "FuselageGeom"
  location (X Y Z) 6.71554 -0.737262 -1.19833, rotation 0 7 0; relative location 0 0 0, rotation 0 7 0
  bounding box size 0.463381 0.363964 0.725966
  totals: TotalSpan=0.750223 TotalProjectedSpan=1e-06 TotalChord=0.28956 TotalArea=0.217234 TotalAR=0
  root: chord 0.3048, twist 0, NACA 4-series Camber=0 CamberLoc=0.2 ThickChord=0.1
  sections:
    n  Span      Root_Chord  Tip_Chord  Area      Sweep  Sweep_Location  Dihedral  Twist  Twist_Location  tip airfoil
    1  0.750223  0.3048      0.27432    0.217234  20     0               -119.022  0      0.25            as above

Fuselage "FuselageGeom", child of "WingGeom"
  location (X Y Z) 0 0 0, rotation 0 0 0; relative location 0 0 0, rotation 0 -6 0
  bounding box size 30 2.70416 3
  Design: Length=2.85404
  cross sections:
    n  XLocPercent  YLocPercent  ZLocPercent  shape
    0  0            0            0            point
    1  0            0            0            circle Circle_Diameter=0.0762
    2  0.5          0            0            as above
    3  1            0            0            as above
    4  1            0            0            point

Wing "WingGeom", child of "FuselageGeom"
  location (X Y Z) 15 0.621781 -1.30129, rotation 0 7 0; relative location 0 0 0, rotation 0 7 0
  bounding box size 0.407783 0.41237 0.807043
  totals: TotalSpan=0.849999 TotalProjectedSpan=0.41237 TotalChord=0.28956 TotalArea=0.246126 TotalAR=0.690902
  root: chord 0.3048, twist 0, NACA 4-series Camber=0 CamberLoc=0.2 ThickChord=0.1
  sections:
    n  Span      Root_Chord  Tip_Chord  Area      Sweep  Sweep_Location  Dihedral  Twist  Twist_Location  tip airfoil
    1  0.849999  0.3048      0.27432    0.246126  15     0               -60.9783  0      0.25            as above

Wing "WingGeom", child of "FuselageGeom"
  location (X Y Z) 15 -0.621781 -1.30129, rotation 0 7 0; relative location 0 0 0, rotation 0 7 0
  bounding box size 0.407783 0.41237 0.807043
  totals: TotalSpan=0.849999 TotalProjectedSpan=1e-06 TotalChord=0.28956 TotalArea=0.246126 TotalAR=0
  root: chord 0.3048, twist 0, NACA 4-series Camber=0 CamberLoc=0.2 ThickChord=0.1
  sections:
    n  Span      Root_Chord  Tip_Chord  Area      Sweep  Sweep_Location  Dihedral  Twist  Twist_Location  tip airfoil
    1  0.849999  0.3048      0.27432    0.246126  15     0               -119.022  0      0.25            as above
