OpenVSP model (file version 5), 22 components.
Geometry view with OpenVSP parameter names; values to 6 digits, angles in degrees, lengths in the model's unit.
Overall bounding box: X_Min=-20.0016 X_Len=41.5488 Y_Min=-21.524 Y_Len=42.7194 Z_Min=-7.39325 Z_Len=14.0711

Fuselage "EngineGroup-1"
  location (X Y Z) 5 0 -0.543478, rotation 0 30 0
  bounding box size 3.62081 1.8 3.1297
  mass: Density=1.00622 Shell_Flag=0 Mass_Area=1 Mass_Prior=2
  Design: Length=3.133
  cross sections:
    n  XLocPercent  YLocPercent  ZLocPercent  shape
    0  0            0            0            point
    1  0.1          0            0            ellipse Ellipse_Height=1.8 Ellipse_Width=1.8
    2  0.5          0            0            ellipse Ellipse_Height=2.5 Ellipse_Width=1.8
    3  0.9          0            0            ellipse Ellipse_Height=1.8 Ellipse_Width=1.8
    4  1            0            0            point

Fuselage "Rotor-1-Hub"
  location (X Y Z) -13.3 12.44 2.3, rotation 0 -3 0
  bounding box size 1.74979 1.71708 2.20678
  mass: Density=0.153385 Shell_Flag=0 Mass_Area=1 Mass_Prior=0
  Design: Length=1.7
  cross sections:
    n  XLocPercent  YLocPercent  ZLocPercent  shape
    0  0            0            0            point
    1  0.343827     0            0            ellipse Ellipse_Height=2.07182 Ellipse_Width=1.51705
    2  0.5          0            0            ellipse Ellipse_Height=2.2 Ellipse_Width=1.7
    3  0.759227     0            0.0108696    ellipse Ellipse_Height=1.86818 Ellipse_Width=1.58332
    4  1            0            0            point

Fuselage "Rotor-2-Hub"
  location (X Y Z) -13.3 -12.44 2.3, rotation 0 -3 0
  bounding box size 1.74979 1.71708 2.20678
  mass: Density=0.153385 Shell_Flag=0 Mass_Area=1 Mass_Prior=0
  Design: Length=1.7
  cross sections:
    n  XLocPercent  YLocPercent  ZLocPercent  shape
    0  0            0            0            point
    1  0.343827     0            0            ellipse Ellipse_Height=2.07182 Ellipse_Width=1.51705
    2  0.5          0            0            ellipse Ellipse_Height=2.2 Ellipse_Width=1.7
    3  0.759227     0            0.0108696    ellipse Ellipse_Height=1.86818 Ellipse_Width=1.58332
    4  1            0            0            point

Fuselage "Rotor-3-Hub"
  location (X Y Z) 11.586 12.44 5.53, rotation 0 -3 0
  bounding box size 1.74979 1.71708 2.20678
  mass: Density=0.153385 Shell_Flag=0 Mass_Area=1 Mass_Prior=0
  Design: Length=1.7
  cross sections:
    n  XLocPercent  YLocPercent  ZLocPercent  shape
    0  0            0            0            point
    1  0.343827     0            0            ellipse Ellipse_Height=2.07182 Ellipse_Width=1.51705
    2  0.5          0            0            ellipse Ellipse_Height=2.2 Ellipse_Width=1.7
    3  0.759227     0            0.0108696    ellipse Ellipse_Height=1.86818 Ellipse_Width=1.58332
    4  1            0            0            point

Fuselage "Rotor-4-Hub"
  location (X Y Z) 11.586 -12.44 5.53, rotation 0 -3 0
  bounding box size 1.74979 1.71708 2.20678
  mass: Density=0.153385 Shell_Flag=0 Mass_Area=1 Mass_Prior=0
  Design: Length=1.7
  cross sections:
    n  XLocPercent  YLocPercent  ZLocPercent  shape
    0  0            0            0            point
    1  0.343827     0            0            ellipse Ellipse_Height=2.07182 Ellipse_Width=1.51705
    2  0.5          0            0            ellipse Ellipse_Height=2.2 Ellipse_Width=1.7
    3  0.759227     0            0.0108696    ellipse Ellipse_Height=1.86818 Ellipse_Width=1.58332
    4  1            0            0            point

Wing "Rotor-2-support"
  location (X Y Z) -0.321782 0 0.4, rotation 180 -7 0
  symmetric about XZ
  bounding box size 16.9481 24.6379 1.4664
  mass: Density=0.060026 Shell_Flag=0 Mass_Area=1 Mass_Prior=0
  totals: TotalSpan=24.88 TotalProjectedSpan=24.6379 TotalChord=2.8 TotalArea=70.489 TotalAR=8.61163
  root: chord 4.48, twist 0, NACA 4-series Camber=0 CamberLoc=0.2 ThickChord=0.2
  sections:
    n  Span     Root_Chord  Tip_Chord  Area     Sweep  Sweep_Location  Dihedral  Twist  Twist_Location  tip airfoil
    1  6.46552  4.48        2.8        23.5345  -45    0               8         3      0.25            NACA 4-series Camber=0 CamberLoc=0.2 DeltaY=-0.15 Invert=1 ThickChord=0.2
    2  5.97448  2.8         1.12       11.71    -45    0               8         3      0.25            NACA 4-series Camber=0 CamberLoc=0.2 DeltaY=-0.75 Invert=1 ThickChord=0.36

Wing "Rotor-4-support"
  location (X Y Z) 0.00795077 0 0.729994, rotation 0 7 0
  symmetric about XZ
  bounding box size 13.326 23.8749 4.8815
  mass: Density=0.081426 Shell_Flag=0 Mass_Area=1 Mass_Prior=0
  totals: TotalSpan=25.2277 TotalProjectedSpan=23.8749 TotalChord=2.90139 TotalArea=62.0609 TotalAR=9.18467
  root: chord 4.26667, twist 0, NACA 4-series Camber=0.027 CamberLoc=0.245455 DeltaX=-0.0272727 DeltaY=-0.05 Scale=1.02727 ThickChord=0.27273
  sections:
    n  Span     Root_Chord  Tip_Chord  Area     Sweep   Sweep_Location  Dihedral  Twist  Twist_Location  tip airfoil
    1  2.49015  4.26667     3.26667    9.37956  46.686  0               11.5      0      0.25            NACA 4-series Camber=0 CamberLoc=0.2 DeltaY=-0.1 ThickChord=0.272727
    2  2.0237   3.26667     2.77083    6.10904  46.686  0               17        -1     0.25            NACA 4-series Camber=0 CamberLoc=0.2 DeltaX=-0.107438 ThickChord=0.2
    3  8.1      2.77083     1.06667    15.5419  40      0               21        -1     0.25            NACA 4-series Camber=0 CamberLoc=0.2 DeltaY=1.23967 ThickChord=0.32

Fuselage "Fuselage-100_cabin"
  location (X Y Z) -11 0 -1.41304, rotation 0 0 0
  bounding box size 21.275 6.52877 6.93988
  mass: Density=0.027565 Shell_Flag=0 Mass_Area=1 Mass_Prior=1
  Design: Length=21
  cross sections:
    n  XLocPercent  YLocPercent  ZLocPercent  shape
    0  0            0            -0.0817391   point
    1  0.30145      0            -0.0533472   general fuselage BotStr=1.39745 BotTanAngle=85.9091 CornerRad=0 Height=6 LowStr=1.32259 MaxWidthLoc=0 TopStr=0.785604 TopTanAngle=90 UpStr=1.34755 Width=6.25909
    2  0.490545     0            -0.0413894   general fuselage BotStr=1.39745 BotTanAngle=85.9091 CornerRad=0 Height=6.7455 LowStr=1.32259 MaxWidthLoc=0.172727 TopStr=1.46651 TopTanAngle=90 UpStr=0.955949 Width=6.42973
    3  0.669739     0            -0.037689    general fuselage BotStr=1.39745 BotTanAngle=85.9091 CornerRad=0 Height=6.63824 LowStr=1.32259 MaxWidthLoc=0.4 TopStr=1.43141 TopTanAngle=90 UpStr=0.738126 Width=6.25909
    4  0.818715     0            -0.00504735  general fuselage BotStr=1.12295 BotTanAngle=90 CornerRad=0 Height=5.06558 LowStr=0.911463 MaxWidthLoc=0.672727 TopStr=1.64396 TopTanAngle=86.3182 UpStr=0.164678 Width=4.37339
    5  1            0            0.0903237    point
  SS_Rectangle "SS_RECT_0": Center_U=0.141304 Center_W=0.788043 U_Length=0.146739 W_Length=0.570652
  SS_Rectangle "SS_RECT_1": Center_U=0.141304 Center_W=0.25 U_Length=0.146739 W_Length=0.456522

Fuselage "EngineGroup-5-cowling", child of "Fuselage-100_cabin"
  location (X Y Z) -3.69565 0 0.543478, rotation 0 0 0
  bounding box size 10.7981 5 2.55557
  mass: Density=0.047217 Shell_Flag=0 Mass_Area=1 Mass_Prior=0
  Design: Length=10.1818
  cross sections:
    n  XLocPercent  YLocPercent  ZLocPercent  shape
    0  0            0            -0.0652174   point
    1  0.25         0            0            ellipse Ellipse_Height=2.5 Ellipse_Width=5
    2  1            0            0            ellipse Ellipse_Height=2.5 Ellipse_Width=3.69091
    3  1            0            -0.0108696   point

Wing "LandingGear-040_Front"
  location (X Y Z) -6.33043 2.25 -5, rotation 0 7 0
  symmetric about XZ
  bounding box size 1.52112 6.88822 2.51406
  mass: Density=9.5123 Shell_Flag=0 Mass_Area=1 Mass_Prior=0
  totals: TotalSpan=4.92273 TotalProjectedSpan=2.38822 TotalChord=0.95 TotalArea=4.67659 TotalAR=1.2196
  root: chord 1, twist 0, NACA 4-series Camber=0 CamberLoc=0.2 ThickChord=0.334842
  sections:
    n  Span     Root_Chord  Tip_Chord  Area    Sweep  Sweep_Location  Dihedral  Twist  Twist_Location  tip airfoil
    1  2.46136  1           0.9        2.3383  20     0               -60.9783  0      0.25            NACA 4-series Camber=0 CamberLoc=0.2 ThickChord=0.2

Wing "LandingGear-040_Rear"
  location (X Y Z) 3.12609 2 -4.56522, rotation 0 7 0
  symmetric about XZ
  bounding box size 1.32276 6.91085 2.96291
  mass: Density=8.8276 Shell_Flag=0 Mass_Area=1 Mass_Prior=0
  totals: TotalSpan=6 TotalProjectedSpan=2.91085 TotalChord=0.925 TotalArea=5.55 TotalAR=1.52667
  root: chord 1, twist 0, NACA 4-series Camber=0 CamberLoc=0.2 ThickChord=0.334842
  sections:
    n  Span  Root_Chord  Tip_Chord  Area   Sweep  Sweep_Location  Dihedral  Twist  Twist_Location  tip airfoil
    1  3     1           0.85       2.775  15     0               -60.9783  0      0.25            NACA 4-series Camber=0 CamberLoc=0.2 ThickChord=0.2

Fuselage "LandingGear-020_skids"
  location (X Y Z) -5.43478 -3.45 -7.2587, rotation 0 0 0
  symmetric about XZ
  bounding box size 9.44697 7.15 0.25
  mass: Density=2.144 Shell_Flag=0 Mass_Area=1 Mass_Prior=0
  Design: Length=9.36364
  cross sections:
    n  XLocPercent  YLocPercent  ZLocPercent  shape
    0  0            0            0            point
    1  0            0            0            circle Circle_Diameter=0.25
    2  0.5          0            0            as above
    3  1            0            0            as above
    4  1            0            0            point

Blank "Center-Of-Mass"
  location (X Y Z) 0 0 0, rotation 0 0 0

Custom "fseats"
  location (X Y Z) -5.0345 1.55 -4.43313, rotation 0 -80 0
  symmetric about XZ
  bounding box size 2.7156 4.6 3.28829
  mass: Density=0 Shell_Flag=0 Mass_Area=1 Mass_Prior=0
  Design: BackAngle=10 BackHeight=3 BackThick=0.3 SeatHeight=0.3 SeatLength=1.5 Width=1.5
  custom script Seat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

Custom "mseats"
  location (X Y Z) -1.70117 1.55 -4.43313, rotation 0 -80 0
  symmetric about XZ
  bounding box size 2.7156 4.6 3.28829
  mass: Density=0 Shell_Flag=0 Mass_Area=1 Mass_Prior=0
  Design: BackAngle=10 BackHeight=3 BackThick=0.3 SeatHeight=0.3 SeatLength=1.5 Width=1.5
  custom script Seat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

Custom "rseats"
  location (X Y Z) 1.63216 1.55 -4.43313, rotation 0 -80 0
  symmetric about XZ
  bounding box size 2.7156 4.6 3.28829
  mass: Density=0 Shell_Flag=0 Mass_Area=1 Mass_Prior=0
  Design: BackAngle=10 BackHeight=3 BackThick=0.3 SeatHeight=0.3 SeatLength=1.5 Width=1.5
  custom script Seat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

Custom "EngineGroup-5-duct"
  location (X Y Z) 1.90476 0 0.47619, rotation 0 0 0
  bounding box size 9.83333 4.05964 2.04062
  mass: Density=0 Shell_Flag=0 Mass_Area=1 Mass_Prior=0
  Design: Camber=0.4125 CamberLoc=0.6 Chord=9.83333 Height=1.33876 InvertFlag=0 Shape=0.216667 ThickChord=0.0708333 Width=3.348
  custom script Duct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

Propeller "Rotor-1-Blades"
  location (X Y Z) -12.365 12.365 2.29, rotation 0 90 0
  bounding box size 16.8188 17.5862 0.122584
  mass: Density=1.839 Shell_Flag=0 Mass_Area=1 Mass_Prior=0
  Design: Diameter=18.318 NumBlade=5 Beta34=0 UseBeta34Flag=1 Feather=0 Rotate=-18 Precone=0 ReverseFlag=0 FoldAngle=0 PropMode=0 AF=46.6504 CLi=0.19968 Chord=0.0643 Solidity=0.102337 ConstructXoC=0.25 FeatherAxisXoC=0.25 FeatherOffsetXoC=0
  cross sections:
    n  RadiusFrac  shape
    0  0.12        airfoil file "BOEING-VERTOL VR-12 AIRFOIL"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 BaseThickChord=0.106373 Chord=0.664027 ThickChord=0.1064
    1  0.85        airfoil file "BOEING-VERTOL VR-12 AIRFOIL"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 BaseThickChord=0.106373 Chord=0.539423 ThickChord=0.1064
    2  0.95        airfoil file "SIKORSKY SSC-A09  AIRFOIL"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 BaseThickChord=0.0901604 Chord=0.522354 ThickChord=0.0902
    3  1           airfoil file "SIKORSKY SSC-A09  AIRFOIL"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 BaseThickChord=0.0901604 Chord=0.51382 ThickChord=0.09016
  Chord along r/R (linear): 0.12: 0.0725, 1: 0.0561
  Twist along r/R (linear): 0.12: 7.56, 0.75: 0, 1: -3
  Thick along r/R (linear): 0.12: 0.1064, 0.85: 0.1064, 0.95: 0.0902, 1: 0.09016
  CLI along r/R (linear): 0.12: 0.2, 0.85: 0.2, 0.95: 0.2, 1: 0.2

Propeller "Rotor-2-Blades"
  location (X Y Z) -12.365 -12.365 2.29, rotation 0 90 0
  bounding box size 16.8188 17.5862 0.122584
  mass: Density=1.839 Shell_Flag=0 Mass_Area=1 Mass_Prior=0
  Design: Diameter=18.318 NumBlade=5 Beta34=0 UseBeta34Flag=1 Feather=0 Rotate=18 Precone=0 ReverseFlag=1 FoldAngle=0 PropMode=0 AF=46.6504 CLi=0.19968 Chord=0.0643 Solidity=0.102337 ConstructXoC=0.25 FeatherAxisXoC=0.25 FeatherOffsetXoC=0
  cross sections:
    n  RadiusFrac  shape
    0  0.12        airfoil file "BOEING-VERTOL VR-12 AIRFOIL"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 BaseThickChord=0.106373 Chord=0.664027 ThickChord=0.1064
    1  0.85        airfoil file "BOEING-VERTOL VR-12 AIRFOIL"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 BaseThickChord=0.106373 Chord=0.539423 ThickChord=0.1064
    2  0.95        airfoil file "SIKORSKY SSC-A09  AIRFOIL"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 BaseThickChord=0.0901604 Chord=0.522354 ThickChord=0.0902
    3  1           airfoil file "SIKORSKY SSC-A09  AIRFOIL"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 BaseThickChord=0.0901604 Chord=0.51382 ThickChord=0.09016
  blade curves as in "Rotor-1-Blades"

Propeller "Rotor-3-Blades"
  location (X Y Z) 12.365 12.365 5.5, rotation 0 90 0
  bounding box size 16.8188 17.5862 0.122584
  mass: Density=1.839 Shell_Flag=0 Mass_Area=1 Mass_Prior=0
  Design: Diameter=18.318 NumBlade=5 Beta34=0 UseBeta34Flag=1 Feather=0 Rotate=18 Precone=0 ReverseFlag=1 FoldAngle=0 PropMode=0 AF=46.6504 CLi=0.19968 Chord=0.0643 Solidity=0.102337 ConstructXoC=0.25 FeatherAxisXoC=0.25 FeatherOffsetXoC=0
  cross sections:
    n  RadiusFrac  shape
    0  0.12        airfoil file "BOEING-VERTOL VR-12 AIRFOIL"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 BaseThickChord=0.106373 Chord=0.664027 ThickChord=0.1064
    1  0.85        airfoil file "BOEING-VERTOL VR-12 AIRFOIL"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 BaseThickChord=0.106373 Chord=0.539423 ThickChord=0.1064
    2  0.95        airfoil file "SIKORSKY SSC-A09  AIRFOIL"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 BaseThickChord=0.0901604 Chord=0.522354 ThickChord=0.0902
    3  1           airfoil file "SIKORSKY SSC-A09  AIRFOIL"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 BaseThickChord=0.0901604 Chord=0.51382 ThickChord=0.09016
  blade curves as in "Rotor-1-Blades"

Propeller "Rotor-4-Blades"
  location (X Y Z) 12.365 -12.365 5.5, rotation 0 90 0
  bounding box size 18.3411 18.318 0.122584
  mass: Density=1.839 Shell_Flag=0 Mass_Area=1 Mass_Prior=0
  Design: Diameter=18.318 NumBlade=5 Beta34=0 UseBeta34Flag=1 Feather=0 Rotate=-18 Precone=0 ReverseFlag=0 FoldAngle=0 PropMode=1 AF=46.6504 CLi=0.19968 Chord=0.0643 Solidity=0.102337 ConstructXoC=0.25 FeatherAxisXoC=0.25 FeatherOffsetXoC=0
  cross sections:
    n  RadiusFrac  shape
    0  0.12        airfoil file "BOEING-VERTOL VR-12 AIRFOIL"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 BaseThickChord=0.106373 Chord=0.664027 ThickChord=0.1064
    1  0.85        airfoil file "BOEING-VERTOL VR-12 AIRFOIL"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 BaseThickChord=0.106373 Chord=0.539423 ThickChord=0.1064
    2  0.95        airfoil file "SIKORSKY SSC-A09  AIRFOIL"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 BaseThickChord=0.0901604 Chord=0.522354 ThickChord=0.0902
    3  1           airfoil file "SIKORSKY SSC-A09  AIRFOIL"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 BaseThickChord=0.0901604 Chord=0.51382 ThickChord=0.09016
  blade curves as in "Rotor-1-Blades"

Fuselage "FuelTank-1-100_FULL"
  location (X Y Z) 3.36957 0 -3.36957, rotation 0 0 0
  bounding box size 1.84928 1.6 1.6
  mass: Density=1.538 Shell_Flag=0 Mass_Area=1 Mass_Prior=2
  Design: Length=1.6
  cross sections:
    n  XLocPercent  YLocPercent  ZLocPercent  shape
    0  0            0            0            point
    1  0.013587     0            0            rounded rectangle RoundRectXSec_Radius=0.1 RoundedRect_Height=1.6 RoundedRect_Width=1.6
    2  0.5          0            0            as above
    3  0.991848     0            0            as above
    4  1            0            0            point

VSPAERO settings: Sref=49.5 bref=22 cref=2.25 Xcg=9.04452 Ycg=-0.0104482 Zcg=2.09208 AlphaStart=1 AlphaEnd=10 AlphaNpts=3 BetaStart=0 BetaEnd=0 BetaNpts=1 MachStart=0 MachEnd=0 MachNpts=1 ReCref=1e+07 Vinf=100 Rho=0.002377
