OpenVSP model (file version 5), 14 components.
Geometry view with OpenVSP parameter names; values to 6 digits, angles in degrees, lengths in the model's unit.
Overall bounding box: X_Min=-0.758704 X_Len=30.7587 Y_Min=-8.53109 Y_Len=23.5581 Z_Min=-13.4782 Z_Len=26.9564

Fuselage "FuselageGeom"
  location (X Y Z) 0 0 0, rotation 0 0 0
  bounding box size 30 2.70416 3
  Design: Length=9
  cross sections:
    n  XLocPercent  YLocPercent  ZLocPercent  shape
    0  0            0            0            point
    1  0.024145     0            -0.002082    general fuselage BotStr=0.827589 BotTanAngle=90 CornerRad=0 Height=0.626315 LowStr=0.81429 MaxWidthLoc=0.024812 TopStr=1.10925 TopTanAngle=90 UpStr=0.692274 Width=0.671635
    2  0.121627     0            0.025612     general fuselage BotStr=1.19151 BotTanAngle=90 CornerRad=0 Height=1.46335 LowStr=1.27 MaxWidthLoc=-0.117303 TopStr=0.342421 TopTanAngle=90 UpStr=1.7302 Width=1.44578
    3  0.211428     0            0.04395      general fuselage BotStr=1.1383 BotTanAngle=90 CornerRad=0 Height=1.79321 LowStr=1.42286 MaxWidthLoc=-0.190324 TopStr=0.651397 TopTanAngle=90 UpStr=1.74091 Width=1.68866
    4  0.418359     0            0.04395      general fuselage BotStr=1.27659 BotTanAngle=90 CornerRad=0 Height=1.79321 LowStr=1.42286 MaxWidthLoc=-0.190324 TopStr=1.00146 TopTanAngle=90 UpStr=2 Width=1.8
    5  0.479564     0            0.053155     general fuselage BotStr=0.781013 BotTanAngle=90 CornerRad=0 Height=1.6453 LowStr=1.5 MaxWidthLoc=-0.125562 TopStr=1.25 TopTanAngle=90 UpStr=1.50472 Width=1.49558
    6  0.614653     0            0.098281     general fuselage BotStr=0.337871 BotTanAngle=90 CornerRad=0 Height=0.787875 LowStr=1.0683 MaxWidthLoc=-0.310309 TopStr=1.54262 TopTanAngle=90 UpStr=0.818164 Width=0.930531
    7  0.923427     0            0.116377     general fuselage BotStr=0.952476 BotTanAngle=90 CornerRad=0 Height=0.347515 LowStr=0.67819 MaxWidthLoc=-0.500607 TopStr=2 TopTanAngle=90 UpStr=1.27804 Width=0.256001
    8  1            0            0.118292     point

Wing "WingGeom", child of "FuselageGeom"
  location (X Y Z) 8.50644 0 1.5, rotation 0 0 0; relative location 0 0 0, rotation 0 0 0
  symmetric about XZ
  bounding box size 1.9455 10.8851 1.18142
  totals: TotalSpan=10.8918 TotalProjectedSpan=10.8851 TotalChord=1.20806 TotalArea=16.2 TotalAR=7.31398
  root: chord 1.9455, twist 0, airfoil file "NASA/LANGLEY LS(1)-0417 (GA(W)-1) AIRFOIL"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 BaseThickChord=0.16998 ThickChord=0.16998
  sections:
    n  Span      Root_Chord  Tip_Chord  Area      Sweep    Sweep_Location  Dihedral  Twist  Twist_Location  tip airfoil
    1  3.1783    1.9455      1.47642    5.43795   0        0.7             -2        -0.5   0.7             as above
    2  1.42844   1.47642     1.18113    1.89807   0        0.7             -2        -0.5   0.7             as above
    3  0.449012  1.18113     1.01537    0.493128  3.63636  0.7             -2        -0.5   0.7             as above
    4  0.390138  1.01537     0.373126   0.270852  8        0.7             -2        -0.5   0.7             as above

Fuselage "FuselageGeom", child of "WingGeom"
  location (X Y Z) 0 0 0, rotation 0 0 0; relative location -1.148 0 -0.2, rotation 0 0 0
  symmetric about XZ
  bounding box size 30 2.70416 3
  Design: Length=3.84
  cross sections:
    n  XLocPercent  YLocPercent  ZLocPercent  shape
    0  0            0            0            point
    1  0.25         0            0            circle Circle_Diameter=0.3
    2  0.5          0            0            as above
    3  0.75         0            0            as above
    4  1            0            0            point

Fuselage "FuselageGeom", child of "FuselageGeom"
  location (X Y Z) 0 0 0, rotation 0 0 0; relative location 0 0 0.1, rotation 180 90 0
  symmetric about XZ
  bounding box size 30 2.70416 3
  Design: Length=0.3
  cross sections:
    n  XLocPercent  YLocPercent  ZLocPercent  shape
    0  0            0            0            point
    1  0.25         0            0            circle Circle_Diameter=0.225
    2  0.5          0            0            as above
    3  0.75         0            0            as above
    4  1            0            0            point

Propeller "PropGeom", child of "FuselageGeom"
  location (X Y Z) 0 0 0, rotation 0 0 0; relative location 0 -0.1125 0, rotation 0 180 0
  symmetric about XZ
  bounding box size 1.49091 23.5581 26.9564
  Design: Diameter=2 NumBlade=2 Beta34=0 UseBeta34Flag=1 Feather=0 Rotate=0 Precone=0 ReverseFlag=0 FoldAngle=0 PropMode=1 AF=151.538 CLi=0.538798 Chord=0.177656 Solidity=0.169649 ConstructXoC=0.5 FeatherAxisXoC=0.5 FeatherOffsetXoC=0
  cross sections:
    n  RadiusFrac  shape
    0  0.21        airfoil file "BOEING-VERTOL VR-12 AIRFOIL"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 BaseThickChord=0.106373 Chord=1.2 ThickChord=0.106373
    1  0.75        airfoil file "BOEING-VERTOL VR-12 AIRFOIL"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 BaseThickChord=0.106373 Chord=2.49375 ThickChord=0.106373
    2  1           airfoil file "BOEING-VERTOL VR-12 AIRFOIL"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 BaseThickChord=0.106373 Chord=1.95 ThickChord=0.106373
  Chord along r/R (linear): 0.21: 0.557, 0.259375: 0.548288, 0.358125: 0.530863, 0.456875: 0.513438, 0.555625: 0.496013, 0.654375: 0.478588, 0.753125: 0.461163, 0.851875: 0.443738, 0.950625: 0.426313, 1: 0.4176
  Twist along r/R (linear): 0.2: 8.1, 0.75: 0, 1: -3.75
  Thick along r/R (linear): 0.21: 0.10637, 0.259375: 0.10637, 0.358125: 0.10637, 0.456875: 0.10637, 0.555625: 0.10637, 0.654375: 0.10637, 0.753125: 0.10637, 0.851875: 0.10637, 0.950625: 0.10637, 1: 0.10637
  CLI along r/R (cubic Bezier): 0.2: 0, 0.266667: 0.7, 0.333333: 0.7, 0.4: 0.7, 0.466667: 0.7, 0.533333: 0.7, 0.6: 0.7, 0.733333: 0.7, 0.866667: 0.7, 1: 0.2

Fuselage "FuselageGeom", child of "FuselageGeom"
  location (X Y Z) 0 0 0, rotation 0 0 0; relative location 0 0 0.1, rotation 180 90 0
  symmetric about XZ
  bounding box size 30 2.70416 3
  Design: Length=0.3
  cross sections:
    n  XLocPercent  YLocPercent  ZLocPercent  shape
    0  0            0            0            point
    1  0.25         0            0            circle Circle_Diameter=0.225
    2  0.5          0            0            as above
    3  0.75         0            0            as above
    4  1            0            0            point

Propeller "PropGeom", child of "FuselageGeom"
  location (X Y Z) 0 0 0, rotation 0 0 0; relative location 0 -0.1125 0, rotation 0 180 0
  symmetric about XZ
  bounding box size 1.49091 23.5581 26.9564
  Design: Diameter=2 NumBlade=2 Beta34=0 UseBeta34Flag=1 Feather=0 Rotate=0 Precone=0 ReverseFlag=0 FoldAngle=0 PropMode=1 AF=151.538 CLi=0.538798 Chord=0.177656 Solidity=0.169649 ConstructXoC=0.5 FeatherAxisXoC=0.5 FeatherOffsetXoC=0
  cross sections:
    n  RadiusFrac  shape
    0  0.21        airfoil file "BOEING-VERTOL VR-12 AIRFOIL"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 BaseThickChord=0.106373 Chord=1.2 ThickChord=0.106373
    1  0.75        airfoil file "BOEING-VERTOL VR-12 AIRFOIL"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 BaseThickChord=0.106373 Chord=2.49375 ThickChord=0.106373
    2  1           airfoil file "BOEING-VERTOL VR-12 AIRFOIL"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 BaseThickChord=0.106373 Chord=1.95 ThickChord=0.106373
  blade curves as in "PropGeom"

Fuselage "FuselageGeom", child of "WingGeom"
  location (X Y Z) 0 0 0, rotation 0 0 0; relative location -1.3 0 -0.2, rotation 0 0 0
  symmetric about XZ
  bounding box size 30 2.70416 3
  Design: Length=3.84
  cross sections:
    n  XLocPercent  YLocPercent  ZLocPercent  shape
    0  0            0            0            point
    1  0.25         0            0            circle Circle_Diameter=0.3
    2  0.5          0            0            as above
    3  0.75         0            0            as above
    4  1            0            0            point

Fuselage "FuselageGeom", child of "FuselageGeom"
  location (X Y Z) 0 0 0, rotation 0 0 0; relative location 0 0 0.1, rotation 180 90 0
  symmetric about XZ
  bounding box size 30 2.70416 3
  Design: Length=0.3
  cross sections:
    n  XLocPercent  YLocPercent  ZLocPercent  shape
    0  0            0            0            point
    1  0.25         0            0            circle Circle_Diameter=0.225
    2  0.5          0            0            as above
    3  0.75         0            0            as above
    4  1            0            0            point

Propeller "PropGeom", child of "FuselageGeom"
  location (X Y Z) 0 0 0, rotation 0 0 0; relative location 0 -0.1125 0, rotation 0 180 0
  symmetric about XZ
  bounding box size 1.49091 23.5581 26.9564
  Design: Diameter=2 NumBlade=2 Beta34=0 UseBeta34Flag=1 Feather=0 Rotate=0 Precone=0 ReverseFlag=0 FoldAngle=0 PropMode=1 AF=151.538 CLi=0.538798 Chord=0.177656 Solidity=0.169649 ConstructXoC=0.5 FeatherAxisXoC=0.5 FeatherOffsetXoC=0
  cross sections:
    n  RadiusFrac  shape
    0  0.21        airfoil file "BOEING-VERTOL VR-12 AIRFOIL"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 BaseThickChord=0.106373 Chord=1.2 ThickChord=0.106373
    1  0.75        airfoil file "BOEING-VERTOL VR-12 AIRFOIL"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 BaseThickChord=0.106373 Chord=2.49375 ThickChord=0.106373
    2  1           airfoil file "BOEING-VERTOL VR-12 AIRFOIL"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 BaseThickChord=0.106373 Chord=1.95 ThickChord=0.106373
  blade curves as in "PropGeom"

Fuselage "FuselageGeom", child of "FuselageGeom"
  location (X Y Z) 0 0 0, rotation 0 0 0; relative location 0 0 0.1, rotation 180 90 0
  symmetric about XZ
  bounding box size 30 2.70416 3
  Design: Length=0.3
  cross sections:
    n  XLocPercent  YLocPercent  ZLocPercent  shape
    0  0            0            0            point
    1  0.25         0            0            circle Circle_Diameter=0.225
    2  0.5          0            0            as above
    3  0.75         0            0            as above
    4  1            0            0            point

Propeller "PropGeom", child of "FuselageGeom"
  location (X Y Z) 0 0 0, rotation 0 0 0; relative location 0 -0.1125 0, rotation 0 180 0
  symmetric about XZ
  bounding box size 1.49091 23.5581 26.9564
  Design: Diameter=2 NumBlade=2 Beta34=0 UseBeta34Flag=1 Feather=0 Rotate=0 Precone=0 ReverseFlag=0 FoldAngle=0 PropMode=1 AF=151.538 CLi=0.538798 Chord=0.177656 Solidity=0.169649 ConstructXoC=0.5 FeatherAxisXoC=0.5 FeatherOffsetXoC=0
  cross sections:
    n  RadiusFrac  shape
    0  0.21        airfoil file "BOEING-VERTOL VR-12 AIRFOIL"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 BaseThickChord=0.106373 Chord=1.2 ThickChord=0.106373
    1  0.75        airfoil file "BOEING-VERTOL VR-12 AIRFOIL"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 BaseThickChord=0.106373 Chord=2.49375 ThickChord=0.106373
    2  1           airfoil file "BOEING-VERTOL VR-12 AIRFOIL"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 BaseThickChord=0.106373 Chord=1.95 ThickChord=0.106373
  blade curves as in "PropGeom"

Fuselage "FuselageGeom", child of "FuselageGeom"
  location (X Y Z) 0 0 0, rotation 0 0 0
  bounding box size 30 2.70416 3
  Design: Length=0.3
  cross sections:
    n  XLocPercent  YLocPercent  ZLocPercent  shape
    0  0            0            0            point
    1  0.25         0            0            circle Circle_Diameter=0.166667
    2  0.5          0            0            as above
    3  0.75         0            0            as above
    4  1            0            0            point

Propeller "PropGeom", child of "FuselageGeom"
  location (X Y Z) 0 0 0, rotation 0 0 0; relative location 0 -0.08 0, rotation 0 180 0
  bounding box size 1.49091 23.5581 26.9564
  Design: Diameter=2 NumBlade=5 Beta34=0 UseBeta34Flag=1 Feather=0 Rotate=0 Precone=0 ReverseFlag=0 FoldAngle=0 PropMode=1 AF=151.538 CLi=0.538798 Chord=0.177656 Solidity=0.169649 ConstructXoC=0.5 FeatherAxisXoC=0.5 FeatherOffsetXoC=0
  cross sections:
    n  RadiusFrac  shape
    0  0.21        airfoil file "BOEING-VERTOL VR-12 AIRFOIL"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 BaseThickChord=0.106373 Chord=1.2 ThickChord=0.106373
    1  0.75        airfoil file "BOEING-VERTOL VR-12 AIRFOIL"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 BaseThickChord=0.106373 Chord=2.49375 ThickChord=0.106373
    2  1           airfoil file "BOEING-VERTOL VR-12 AIRFOIL"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 BaseThickChord=0.106373 Chord=1.95 ThickChord=0.106373
  Chord along r/R (linear): 0.21: 0.5086, 0.259375: 0.500656, 0.358125: 0.484769, 0.456875: 0.468881, 0.555625: 0.452994, 0.654375: 0.437106, 0.753125: 0.421219, 0.851875: 0.405331, 0.950625: 0.389444, 1: 0.3815
  Twist along r/R (linear): 0.2: 19.32, 0.75: 0, 1: -8.33
  Thick along r/R (linear): 0.21: 0.10637, 0.259375: 0.10637, 0.358125: 0.10637, 0.456875: 0.10637, 0.555625: 0.10637, 0.654375: 0.10637, 0.753125: 0.10637, 0.851875: 0.10637, 0.950625: 0.10637, 1: 0.10637
  CLI along r/R (cubic Bezier): 0.2: 0, 0.266667: 0.7, 0.333333: 0.7, 0.4: 0.7, 0.466667: 0.7, 0.533333: 0.7, 0.6: 0.7, 0.733333: 0.7, 0.866667: 0.7, 1: 0.2
